New Linecode.BT_1/0AAAC_AAAC_1/0_1 nphases=2 units=km
~ rmatrix = [ 0.1971 0.194803 | 0.194803 0.192543 ]
~ xmatrix = [ 0.721362 0.361938 | 0.361938 0.726975 ]
~ cmatrix = [ 9.49193 -2.80787 | -2.80787 9.330369999999998 ]
~ normamps=205

New Linecode.BT_1/0AAAC_AAAC_1/0_3 nphases=3 units=km
~ rmatrix = [ 0.712091386 0.059216675 0.059216675 | 0.059216675 0.712091386 0.059216675 | 0.059216675 0.059216675 697364889.0 ]
~ xmatrix = [ 0.932926708 0.839161795 0.846928935 | 0.839161795 0.932926708 0.846928935 | 0.846928935 0.846928935 0.931683966 ]
~ normamps=205

New Linecode.BT_1/0AAAC_AAAC_1/0_4 nphases=3 units=km
~ rmatrix = [ 0.712091386 0.059216675 0.059216675 0.059216675 | 0.059216675 0.712091386 0.059216675 0.059216675 | 0.059216675 0.059216675 0.697364889 0.059216675 | 0.059216675 0.059216675 0.059216675 0.697364889 ]
~ xmatrix = [ 0.932926708 0.839161795 0.846928935 0.846928935 | 0.839161795 0.932926708 0.846928935 0.846928935 | 0.846928935 0.846928935 0.931683966 0.846928935 | 0.846928935 0.846928935 0.846928935 0.931683966 ]
~ normamps=205

New Linecode.BT_1/0AAAC_AAAC_123.3_1 nphases=2 units=km
~ rmatrix = [ 0.172111 0.170071 | 0.170071 0.168067 ]
~ xmatrix = [ 0.652344 0.293951 | 0.293951 0.660004 ]
~ cmatrix = [ 9.528929999999999 -2.77357 | -2.77357 9.362169999999999 ]
~ normamps=205

New Linecode.BT_1/0AAAC_AAAC_123.3_3 nphases=3 units=km
~ rmatrix = [ 0.71224363 0.059229335 0.059229335 | 0.059229335 0.71224363 0.059229335 | 0.059229335 0.059229335 0.697513984 ]
~ xmatrix = [ 0.933126165 0.839341206 0.847110006 | 0.839341206 0.933126165 0.847110006 | 0.847110006 0.847110006 0.931883157 ]
~ normamps=205

New Linecode.BT_1/0AAAC_AAAC_2_1 nphases=2 units=km
~ rmatrix = [ 0.1971 0.194803 | 0.194803 0.192543 ]
~ xmatrix = [ 0.721362 0.361938 | 0.361938 0.726975 ]
~ cmatrix = [ 9.49193 -2.80787 | -2.80787 9.330369999999998 ]
~ normamps=205

New Linecode.BT_1/0AAAC_AAAC_2_3 nphases=3 units=km
~ rmatrix = [ 0.71224363 0.059229335 0.059229335 | 0.059229335 0.71224363 0.059229335 | 0.059229335 0.059229335 0.697513984 ]
~ xmatrix = [ 0.933126165 0.839341206 0.847110006 | 0.839341206 0.933126165 0.847110006 | 0.847110006 0.847110006 0.931883157 ]
~ normamps=205

New Linecode.BT_1/0AAAC_AAAC_2_6 nphases=2 units=km
~ rmatrix = [ 1844308224.0 0.1533704832 0.1533704832 | 0.1533704832 1844308224.0 0.1533704832 | 0.1533704832 0.1533704832 18061667712.0 ]
~ xmatrix = [ 24162690816.0 2173419072.0 2193535872.0 | 2173419072.0 24162690816.0 2193535872.0 | 2193535872.0 2193535872.0 24130503936.0 ]
~ normamps=205

New Linecode.BT_1/0AAAC_AAAC_6_3 nphases=3 units=km
~ rmatrix = [ 0.71224363 0.059229335 0.059229335 | 0.059229335 0.71224363 0.059229335 | 0.059229335 0.059229335 0.697513984 ]
~ xmatrix = [ 0.933126165 0.839341206 0.847110006 | 0.839341206 0.933126165 0.847110006 | 0.847110006 0.847110006 0.931883157 ]
~ normamps=205

New Linecode.BT_1/0AAAC_ACSR_1/0_1 nphases=2 units=km
~ rmatrix = [ 0.159397 0.157563 | 0.157563 0.155761 ]
~ xmatrix = [ 0.667079 0.308492 | 0.308492 0.674354 ]
~ cmatrix = [ 9.38972 -2.9026199999999998 | -2.9026199999999998 9.24254 ]
~ normamps=205

New Linecode.BT_1/0AAAC_ACSR_1/0_3 nphases=3 units=km
~ rmatrix = [ 0.71224363 0.059229335 0.059229335 | 0.059229335 0.71224363 0.059229335 | 0.059229335 0.059229335 0.697513984 ]
~ xmatrix = [ 0.933126165 0.839341206 0.847110006 | 0.839341206 0.933126165 0.847110006 | 0.847110006 0.847110006 0.931883157 ]
~ normamps=205

New Linecode.BT_1/0AAAC_ACSR_2_1 nphases=2 units=km
~ rmatrix = [ 0.18876 0.186603 | 0.186603 0.18448 ]
~ xmatrix = [ 0.734864 0.375257 | 0.375257 0.740114 ]
~ cmatrix = [ 9.38201 -2.90976 | -2.90976 9.23591 ]
~ normamps=205

New Linecode.BT_1/0AAAC_ACSR_2_3 nphases=3 units=km
~ rmatrix = [ 0.71224363 0.059229335 0.059229335 | 0.059229335 0.71224363 0.059229335 | 0.059229335 0.059229335 0.697513984 ]
~ xmatrix = [ 0.933126165 0.839341206 0.847110006 | 0.839341206 0.933126165 0.847110006 | 0.847110006 0.847110006 0.931883157 ]
~ normamps=205

New Linecode.BT_1/0AAAC_ACSR_6_1 nphases=2 units=km
~ rmatrix = [ 0.7601 0.16622 | 0.16622 0.756766 ]
~ xmatrix = [ 0.854769 0.493465 | 0.493465 0.856649 ]
~ cmatrix = [ 9.38147 -2.91027 | -2.91027 9.235449999999998 ]
~ normamps=205

New Linecode.BT_1/0AAAC_ACSR_6_3 nphases=3 units=km
~ rmatrix = [ 0.71224363 0.059229335 0.059229335 | 0.059229335 0.71224363 0.059229335 | 0.059229335 0.059229335 0.697513984 ]
~ xmatrix = [ 0.933126165 0.839341206 0.847110006 | 0.839341206 0.933126165 0.847110006 | 0.847110006 0.847110006 0.931883157 ]
~ normamps=205

New Linecode.BT_1/0AAAC_CO_TR_1/0_1 nphases=2 units=km
~ rmatrix = [ 0.719415 0.12575 | 0.12575 0.716513 ]
~ xmatrix = [ 0.60312 0.245503 | 0.245503 0.612319 ]
~ cmatrix = [ 9.54795 -2.75593 | -2.75593 9.37852 ]
~ normamps=205

New Linecode.BT_1/0AAAC_NE_NE_1 nphases=2 units=km
~ rmatrix = [ 0.1971 0.194803 | 0.194803 0.192543 ]
~ xmatrix = [ 0.721362 0.361938 | 0.361938 0.726975 ]
~ cmatrix = [ 9.49193 -2.80787 | -2.80787 9.330369999999998 ]
~ normamps=205

New Linecode.BT_1/0AAC_AAAC_2_3 nphases=3 units=km
~ rmatrix = [ 0.71224363 0.059229335 0.059229335 | 0.059229335 0.71224363 0.059229335 | 0.059229335 0.059229335 0.697513984 ]
~ xmatrix = [ 0.933126165 0.839341206 0.847110006 | 0.839341206 0.933126165 0.847110006 | 0.847110006 0.847110006 0.931883157 ]
~ normamps=180

New Linecode.BT_1/0AAC_AAAC_246.9_1 nphases=2 units=km
~ rmatrix = [ 0.659721 0.097439 | 0.097439 0.657572 ]
~ xmatrix = [ 0.585601 0.222349 | 0.222349 0.595558 ]
~ cmatrix = [ 9.44902 -2.64506 | -2.64506 9.278450000000001 ]
~ normamps=180

New Linecode.BT_1/0AAC_ACSR_1/0_3 nphases=3 units=km
~ rmatrix = [ 0.71224363 0.059229335 0.059229335 | 0.059229335 0.71224363 0.059229335 | 0.059229335 0.059229335 0.71224363 ]
~ xmatrix = [ 0.933126165 0.839341206 0.84922312 | 0.839341206 0.933126165 0.84922312 | 0.84922312 0.84922312 0.933126165 ]
~ normamps=247

New Linecode.BT_1/0AAC_ACSR_2_1 nphases=2 units=km
~ rmatrix = [ 0.749956 0.186603 | 0.186603 0.745676 ]
~ xmatrix = [ 0.74088 0.375257 | 0.375257 0.74613 ]
~ cmatrix = [ 9.24577 -2.83364 | -2.83364 9.10349 ]
~ normamps=247

New Linecode.BT_1/0AAC_ACSR_6_1 nphases=2 units=km
~ rmatrix = [ 0.729096 0.16622 | 0.16622 0.725762 ]
~ xmatrix = [ 0.860785 0.493465 | 0.493465 0.862665 ]
~ cmatrix = [ 9.24522 -2.83415 | -2.83415 9.103019999999999 ]
~ normamps=247

New Linecode.BT_1/0AAC_ACSR_6_3 nphases=3 units=km
~ rmatrix = [ 0.71224363 0.059229335 0.059229335 | 0.059229335 0.71224363 0.059229335 | 0.059229335 0.059229335 0.71224363 ]
~ xmatrix = [ 0.933126165 0.839341206 0.84922312 | 0.839341206 0.933126165 0.84922312 | 0.84922312 0.84922312 0.933126165 ]
~ normamps=247

New Linecode.BT_1/0AAC_ACSR_6_6 nphases=2 units=km
~ rmatrix = [ 0.71224363 0.059229335 0.059229335 | 0.059229335 0.71224363 0.059229335 | 0.059229335 0.059229335 0.71224363 ]
~ xmatrix = [ 0.933126165 0.839341206 0.84922312 | 0.839341206 0.933126165 0.84922312 | 0.84922312 0.84922312 0.933126165 ]
~ normamps=247

New Linecode.BT_1/0AAC_ACSR_8_6 nphases=2 units=km
~ rmatrix = [ 0.71224363 0.059229335 0.059229335 | 0.059229335 0.71224363 0.059229335 | 0.059229335 0.059229335 0.764760721 ]
~ xmatrix = [ 0.933126165 0.839341206 0.846861405 | 0.839341206 0.839341206 0.846861405 | 0.846861405 0.846861405 0.927594779 ]
~ normamps=247

New Linecode.BT_1/0ACSR_AAAC_1/0_1 nphases=2 units=km
~ rmatrix = [ 0.757104 0.174279 | 0.174279 0.752958 ]
~ xmatrix = [ 0.733717 0.300464 | 0.300464 0.741175 ]
~ cmatrix = [ 8.05932 -2.03572 | -2.03572 7.93697 ]
~ normamps=242

New Linecode.BT_1/0ACSR_AAAC_123.3_1 nphases=2 units=km
~ rmatrix = [ 0.752844 0.170071 | 0.170071 0.7488 ]
~ xmatrix = [ 0.727102 0.293951 | 0.293951 0.734762 ]
~ cmatrix = [ 8.05954 -2.03552 | -2.03552 7.93716 ]
~ normamps=242

New Linecode.BT_1/0ACSR_AAAC_2_1 nphases=2 units=km
~ rmatrix = [ 0.777834 0.194803 | 0.194803 0.773276 ]
~ xmatrix = [ 0.79612 0.361938 | 0.361938 0.801732 ]
~ cmatrix = [ 8.030199999999999 -2.06295 | -2.06295 7.9115 ]
~ normamps=242

New Linecode.BT_1/0ACSR_AAAC_246.9_1 nphases=2 units=km
~ rmatrix = [ 0.679259 0.097439 | 0.097439 0.677109 ]
~ xmatrix = [ 0.654343 0.222349 | 0.222349 0.664299 ]
~ cmatrix = [ 8.10726 -1.9908899999999998 | -1.9908899999999998 7.978880000000001 ]
~ normamps=242

New Linecode.BT_1/0ACSR_ACSR_1/0_1 nphases=2 units=km
~ rmatrix = [ 0.740131 0.157563 | 0.157563 0.736494 ]
~ xmatrix = [ 0.741836 0.308492 | 0.308492 0.749112 ]
~ cmatrix = [ 7.94882 -2.13905 | -2.13905 7.840349999999999 ]
~ normamps=242

New Linecode.BT_1/0ACSR_ACSR_1/0_3 nphases=3 units=km
~ rmatrix = [ 0.71224363 0.059229335 0.059229335 | 0.059229335 0.71224363 0.059229335 | 0.059229335 0.059229335 0.764760721 ]
~ xmatrix = [ 0.933126165 0.839341206 0.846861405 | 0.839341206 0.933126165 0.846861405 | 0.846861405 0.846861405 0.927594779 ]
~ normamps=242

New Linecode.BT_1/0ACSR_ACSR_1/0_4 nphases=3 units=km
~ rmatrix = [ 1844308224.0 0.1533704832 0.1533704832 0.1533704832 | 0.1533704832 1844308224.0 0.1533704832 0.1533704832 | 0.1533704832 0.1533704832 19888273152.0 0.1533704832 | 0.1533704832 0.1533704832 0.1533704832 19888273152.0 ]
~ xmatrix = [ 24162690816.0 2173419072.0 21928921344.0 21928921344.0 | 2173419072.0 24162690816.0 21928921344.0 21928921344.0 | 21928921344.0 21928921344.0 240194592.0 21928921344.0 | 21928921344.0 21928921344.0 21928921344.0 240194592.0 ]
~ normamps=242

New Linecode.BT_1/0ACSR_ACSR_1/0_6 nphases=2 units=km
~ rmatrix = [ 0.71224363 0.059229335 0.059229335 | 0.059229335 0.71224363 0.059229335 | 0.059229335 0.059229335 0.764760721 ]
~ xmatrix = [ 0.933126165 0.839341206 0.846861405 | 0.839341206 0.933126165 0.846861405 | 0.846861405 0.846861405 0.927594779 ]
~ normamps=242

New Linecode.BT_1/0ACSR_ACSR_123.3_1 nphases=2 units=km
~ rmatrix = [ 0.769494 0.186603 | 0.186603 0.765214 ]
~ xmatrix = [ 0.809622 0.375257 | 0.375257 0.814872 ]
~ cmatrix = [ 7.942660000000001 -2.1448 | -2.1448 7.83497 ]
~ normamps=242

New Linecode.BT_1/0ACSR_ACSR_2/0_1 nphases=2 units=km
~ rmatrix = [ 0.722245 0.1399 | 0.1399 0.71905 ]
~ xmatrix = [ 0.717876 0.284904 | 0.284904 0.72589 ]
~ cmatrix = [ 7.961899999999999 -2.12681 | -2.12681 7.851800000000001 ]
~ normamps=242

New Linecode.BT_1/0ACSR_ACSR_2_1 nphases=2 units=km
~ rmatrix = [ 0.769494 0.186603 | 0.186603 0.765214 ]
~ xmatrix = [ 0.809622 0.375257 | 0.375257 0.814872 ]
~ cmatrix = [ 7.942660000000001 -2.1448 | -2.1448 7.83497 ]
~ normamps=242

New Linecode.BT_1/0ACSR_ACSR_2_3 nphases=3 units=km
~ rmatrix = [ 0.71224363 0.059229335 0.059229335 | 0.059229335 0.71224363 0.059229335 | 0.059229335 0.059229335 0.764760721 ]
~ xmatrix = [ 0.933126165 0.839341206 0.846861405 | 0.839341206 0.933126165 0.846861405 | 0.846861405 0.846861405 0.927594779 ]
~ normamps=242

New Linecode.BT_1/0ACSR_ACSR_2_4 nphases=3 units=km
~ rmatrix = [ 0.7122 0.059229 0.059229 0.059229 | 0.059229 0.7122 0.059229 0.059229 | 0.059229 0.059229 0.76805 0.059229 | 0.059229 0.059229 0.059229 0.76805 ]
~ xmatrix = [ 0.933 0.8393 0.846861 0.846861 | 0.8393 0.933126 0.846861 0.846861 | 0.846861 0.846861 0.92759 0.846861 | 0.846861 0.846861 0.846861 0.92759 ]
~ normamps=242

New Linecode.BT_1/0ACSR_ACSR_2_6 nphases=2 units=km
~ rmatrix = [ 0.71224363 0.059229335 0.059229335 | 0.059229335 0.71224363 0.059229335 | 0.059229335 0.059229335 0.764760721 ]
~ xmatrix = [ 0.933126165 0.839341206 0.846861405 | 0.839341206 0.933126165 0.846861405 | 0.846861405 0.846861405 0.927594779 ]
~ normamps=242

New Linecode.BT_1/0ACSR_ACSR_6_1 nphases=2 units=km
~ rmatrix = [ 0.748633 0.16622 | 0.16622 0.7453 ]
~ xmatrix = [ 0.929527 0.493465 | 0.493465 0.931407 ]
~ cmatrix = [ 7.9422299999999995 -2.1452099999999996 | -2.1452099999999996 7.83459 ]
~ normamps=242

New Linecode.BT_1/0ACSR_ACSR_6_3 nphases=3 units=km
~ rmatrix = [ 0.71224363 0.059229335 0.059229335 | 0.059229335 0.71224363 0.059229335 | 0.059229335 0.059229335 0.764760721 ]
~ xmatrix = [ 0.933126165 0.839341206 0.846861405 | 0.839341206 0.933126165 0.846861405 | 0.846861405 0.846861405 0.927594779 ]
~ normamps=242

New Linecode.BT_1/0ACSR_ACSR_6_6 nphases=2 units=km
~ rmatrix = [ 0.71224363 0.059229335 0.059229335 | 0.059229335 0.71224363 0.059229335 | 0.059229335 0.059229335 0.764760721 ]
~ xmatrix = [ 0.933126165 0.839341206 0.846861405 | 0.839341206 0.933126165 0.846861405 | 0.846861405 0.846861405 0.927594779 ]
~ normamps=242

New Linecode.BT_1/0ACSR_ACSR_8_1 nphases=2 units=km
~ rmatrix = [ 0.718114 0.136196 | 0.136196 0.715763 ]
~ xmatrix = [ 0.966988 0.530431 | 0.530431 0.967884 ]
~ cmatrix = [ 7.96184 -2.12687 | -2.12687 7.8517399999999995 ]
~ normamps=242

New Linecode.BT_1/0ACSR_CO_TR_1/0_1 nphases=2 units=km
~ rmatrix = [ 0.706773 0.124597 | 0.124597 0.703914 ]
~ xmatrix = [ 0.681183 0.248762 | 0.248762 0.690291 ]
~ cmatrix = [ 8.056799999999999 -2.03808 | -2.03808 7.934760000000001 ]
~ normamps=242

New Linecode.BT_1/0ACSR_CO_TR_1/0_3 nphases=3 units=km
~ rmatrix = [ 0.71224363 0.059229335 0.059229335 | 0.059229335 0.71224363 0.059229335 | 0.059229335 0.059229335 0.764760721 ]
~ xmatrix = [ 0.933126165 0.839341206 0.846861405 | 0.839341206 0.933126165 0.846861405 | 0.846861405 0.846861405 0.927594779 ]
~ normamps=242

New Linecode.BT_1/0ACSR_NE_NE_1 nphases=2 units=km
~ rmatrix = [ 0.159397 0.157563 | 0.157563 0.155761 ]
~ xmatrix = [ 0.667079 0.308492 | 0.308492 0.674354 ]
~ cmatrix = [ 9.38972 -2.9026199999999998 | -2.9026199999999998 9.24254 ]
~ normamps=242

New Linecode.BT_1/0CO_SO_ACSR_2_1 nphases=2 units=km
~ rmatrix = [ 0.52896 0.186603 | 0.186603 0.52896 ]
~ xmatrix = [ 0.726157 0.375257 | 0.375257 0.731407 ]
~ cmatrix = [ 9.58699 -3.02567 | -3.02567 9.43507 ]
~ normamps=310

New Linecode.BT_1/0CO_TR_AAAC_2_1 nphases=2 units=km
~ rmatrix = [ 0.53179 0.186603 | 0.186603 0.52751 ]
~ xmatrix = [ 0.736402 0.375257 | 0.375257 0.741652 ]
~ cmatrix = [ 9.346770000000001 -2.89 | -2.89 9.20166 ]
~ normamps=265

New Linecode.BT_1/0CO_TR_AAAC_6_6 nphases=2 units=km
~ rmatrix = [ 0.388067122 0.059229335 0.059229335 | 0.059229335 0.388067122 0.059229335 | 0.059229335 0.059229335 0.388067122 ]
~ xmatrix = [ 0.933250466 0.839838409 0.849720323 | 0.839838409 0.933250466 0.849720323 | 0.849720323 0.849720323 0.933250466 ]
~ normamps=265

New Linecode.BT_1/0CO_TR_ACSR_1/0_3 nphases=3 units=km
~ rmatrix = [ 0.388067122 0.059229335 0.059229335 | 0.059229335 0.388067122 0.059229335 | 0.059229335 0.059229335 0.388067122 ]
~ xmatrix = [ 0.933250466 0.839838409 0.849720323 | 0.839838409 0.933250466 0.849720323 | 0.849720323 0.849720323 0.933250466 ]
~ normamps=265

New Linecode.BT_1/0CO_TR_ACSR_123.3_1 nphases=2 units=km
~ rmatrix = [ 0.388067122 0.059229335 0.059229335 | 0.059229335 0.388067122 0.059229335 | 0.059229335 0.059229335 0.388067122 ]
~ xmatrix = [ 0.933250466 0.839838409 0.849720323 | 0.839838409 0.933250466 0.849720323 | 0.849720323 0.849720323 0.933250466 ]
~ normamps=265

New Linecode.BT_1/0CO_TR_ACSR_2_1 nphases=2 units=km
~ rmatrix = [ 0.53179 0.186603 | 0.186603 0.52751 ]
~ xmatrix = [ 0.736402 0.375257 | 0.375257 0.741652 ]
~ cmatrix = [ 9.346770000000001 -2.89 | -2.89 9.20166 ]
~ normamps=265

New Linecode.BT_1/0CO_TR_ACSR_2_3 nphases=3 units=km
~ rmatrix = [ 0.388067122 0.059229335 0.059229335 | 0.059229335 0.388067122 0.059229335 | 0.059229335 0.059229335 0.388067122 ]
~ xmatrix = [ 0.933250466 0.839838409 0.849720323 | 0.839838409 0.933250466 0.849720323 | 0.849720323 0.849720323 0.933250466 ]
~ normamps=265

New Linecode.BT_1/0CO_TR_CO_TR_1/0_1 nphases=2 units=km
~ rmatrix = [ 0.46907 0.124597 | 0.124597 0.466211 ]
~ xmatrix = [ 0.607963 0.248762 | 0.248762 0.617072 ]
~ cmatrix = [ 9.489370000000001 -2.7577700000000003 | -2.7577700000000003 9.324259999999999 ]
~ normamps=230

New Linecode.BT_1/0CO_TR_CO_TR_1/0_3 nphases=3 units=km
~ rmatrix = [ 0.388067122 0.059229335 0.059229335 | 0.059229335 0.388067122 0.059229335 | 0.059229335 0.059229335 0.388067122 ]
~ xmatrix = [ 0.933250466 0.839838409 0.849720323 | 0.839838409 0.933250466 0.849720323 | 0.849720323 0.849720323 0.933250466 ]
~ normamps=265

New Linecode.BT_1/0CO_TR_CO_TR_1/0_4 nphases=3 units=km
~ rmatrix = [ 0.387984172 0.059216675 0.059216675 0.059216675 | 0.059216675 0.387984172 0.059216675 0.059216675 | 0.059216675 0.059216675 0.387984172 0.059216675 | 0.059216675 0.059216675 0.059216675 0.387984172 ]
~ xmatrix = [ 0.933050982 0.839658892 0.849538694 0.849538694 | 0.839658892 0.933050982 0.849538694 0.849538694 | 0.849538694 0.849538694 0.933050982 0.849538694 | 0.849538694 0.849538694 0.849538694 0.933050982 ]
~ normamps=230

New Linecode.BT_1/0CO_TR_CO_TR_1/0_6 nphases=2 units=km
~ rmatrix = [ 0.402248 0.0592176 | 0.0592176 0.402248 ]
~ xmatrix = [ 0.933051 0.514631 | 0.514631 0.933051 ]
~ normamps=230

New Linecode.BT_1/0CobreTrensado_CO_TR_1/0_1 nphases=2 units=km
~ rmatrix = [ 0.46907 0.124597 | 0.124597 0.466211 ]
~ xmatrix = [ 0.607963 0.248762 | 0.248762 0.617072 ]
~ cmatrix = [ 9.489370000000001 -2.7577700000000003 | -2.7577700000000003 9.324259999999999 ]
~ normamps=230

New Linecode.BT_123.3AAAC_AAAC_123.3_1 nphases=2 units=km
~ rmatrix = [ 0.734611 0.170071 | 0.170071 0.730567 ]
~ xmatrix = [ 0.65222 0.293951 | 0.293951 0.65988 ]
~ cmatrix = [ 9.53183 -2.7751099999999997 | -2.7751099999999997 9.364980000000001 ]
~ normamps=256

New Linecode.BT_123.3AAAC_AAAC_123.3_3 nphases=3 units=km
~ rmatrix = [ 0.734611 0.170071 | 0.170071 0.730567 ]
~ xmatrix = [ 0.65222 0.293951 | 0.293951 0.65988 ]
~ cmatrix = [ 9.53183 -2.7751099999999997 | -2.7751099999999997 9.364980000000001 ]
~ normamps=256

New Linecode.BT_123.3AAAC_AAAC_123.3_4 nphases=3 units=km
~ rmatrix = [ 0.683157 0.122858 0.122858 | 0.122858 0.687631 0.122858 | 0.122858 0.122858 0.683157 ]
~ xmatrix = [ 0.752378 0.35053 0.268771 | 0.35053 0.752378 0.293264 | 0.268771 0.293264 0.752378 ]
~ cmatrix = [ 8.37276 -2.59639 -0.9839110000000001 | -2.59639 8.645669999999999 -1.5338699999999998 | -0.9839110000000001 -1.5338699999999998 7.865169999999999 ]
~ normamps=256

New Linecode.BT_123.3AAAC_AAAC_195.7_1 nphases=2 units=km
~ rmatrix = [ 0.679262 0.115432 | 0.115432 0.676629 ]
~ xmatrix = [ 0.59262 0.235291 | 0.235291 0.602146 ]
~ cmatrix = [ 9.571110000000001 -2.7386899999999996 | -2.7386899999999996 9.398739999999998 ]
~ normamps=256

New Linecode.BT_123.3AAAC_AAAC_246.9_1 nphases=2 units=km
~ rmatrix = [ 0.661025 0.097439 | 0.097439 0.658876 ]
~ xmatrix = [ 0.579462 0.222349 | 0.222349 0.589418 ]
~ cmatrix = [ 9.59221 -2.7191300000000003 | -2.7191300000000003 9.416870000000001 ]
~ normamps=256

New Linecode.BT_123.3AAAC_AAAC_77.4_1 nphases=2 units=km
~ rmatrix = [ 0.760017 0.195216 | 0.195216 0.755453 ]
~ xmatrix = [ 0.723102 0.363774 | 0.363774 0.72866 ]
~ cmatrix = [ 9.495230000000001 -2.80904 | -2.80904 9.33353 ]
~ normamps=256

New Linecode.BT_123.3AAAC_ACSR_123.3_1 nphases=2 units=km
~ rmatrix = [ 0.734611 0.170071 | 0.170071 0.730567 ]
~ xmatrix = [ 0.65222 0.293951 | 0.293951 0.65988 ]
~ cmatrix = [ 9.53183 -2.7751099999999997 | -2.7751099999999997 9.364980000000001 ]
~ normamps=256

New Linecode.BT_123.3AAAC_ACSR_123.3_3 nphases=3 units=km
~ rmatrix = [ 0.734611 0.170071 | 0.170071 0.730567 ]
~ xmatrix = [ 0.65222 0.293951 | 0.293951 0.65988 ]
~ cmatrix = [ 9.53183 -2.7751099999999997 | -2.7751099999999997 9.364980000000001 ]
~ normamps=256

New Linecode.BT_123.3AAAC_ACSR_2_1 nphases=2 units=km
~ rmatrix = [ 0.760017 0.195216 | 0.195216 0.755453 ]
~ xmatrix = [ 0.723102 0.363774 | 0.363774 0.72866 ]
~ cmatrix = [ 9.495230000000001 -2.80904 | -2.80904 9.33353 ]
~ normamps=256

New Linecode.BT_123.3ACSR_ACSR_77.4_1 nphases=2 units=km
~ rmatrix = [ 0.679262 0.115432 | 0.115432 0.676629 ]
~ xmatrix = [ 0.59262 0.235291 | 0.235291 0.602146 ]
~ cmatrix = [ 9.571110000000001 -2.7386899999999996 | -2.7386899999999996 9.398739999999998 ]
~ normamps=256

New Linecode.BT_123.3CO_TR_CO_TR_1/0_1 nphases=2 units=km
~ rmatrix = [ 0.689715 0.12575 | 0.12575 0.686813 ]
~ xmatrix = [ 0.602996 0.245503 | 0.245503 0.612196 ]
~ cmatrix = [ 9.55086 -2.75747 | -2.75747 9.38134 ]
~ normamps=256

New Linecode.BT_2AAAC_ACSR_2_1 nphases=2 units=km
~ rmatrix = [ 11519.0 0.194803 | 0.194803 114734.0 ]
~ xmatrix = [ 0.801012 0.361938 | 0.361938 0.806625 ]
~ cmatrix = [ 7.950850000000001 -2.02513 | -2.02513 7.83434 ]
~ normamps=191

New Linecode.BT_2ACSR_AAAC_123.3_1 nphases=2 units=km
~ rmatrix = [ 112691.0 0.170071 | 0.170071 112287.0 ]
~ xmatrix = [ 0.731994 0.293951 | 0.293951 0.739654 ]
~ cmatrix = [ 7.979780000000001 -1.9980699999999998 | -1.9980699999999998 7.859649999999999 ]
~ normamps=184

New Linecode.BT_2ACSR_AAAC_77.4_1 nphases=2 units=km
~ rmatrix = [ 115232.0 0.195216 | 0.195216 114775.0 ]
~ xmatrix = [ 0.802876 0.363774 | 0.363774 0.808434 ]
~ cmatrix = [ 7.951180000000001 -2.02483 | -2.02483 0.0 ]
~ normamps=184

New Linecode.BT_2ACSR_ACSR_2_1 nphases=2 units=km
~ rmatrix = [ 114356.0 0.186603 | 0.186603 113928.0 ]
~ xmatrix = [ 0.814514 0.375257 | 0.375257 0.819764 ]
~ cmatrix = [ 7.864529999999999 -2.10588 | -2.10588 7.7588 ]
~ normamps=150

New Linecode.BT_2ACSR_ACSR_2_3 nphases=3 units=km
~ rmatrix = [ 110893.0 0.05856 0.05856 | 0.05856 110893.0 0.05856 | 0.05856 0.05856 11551875.0 ]
~ xmatrix = [ 0.960625 0.863125 0.87 | 0.863125 0.960625 0.87 | 0.87 0.87 0.9501875 ]
~ normamps=150

New Linecode.BT_2ACSR_ACSR_2_4 nphases=3 units=km
~ rmatrix = [ 110273.0 0.05929 0.05929 0.05929 | 0.05929 110273.0 0.05929 0.05929 | 0.05929 0.05929 1161839.0 0.05929 | 0.05929 0.05929 0.05929 1161839.0 ]
~ xmatrix = [ 0.955251 0.858297 0.858297 0.858297 | 0.858297 0.955251 0.858297 0.858297 | 0.858297 0.858297 0.955251 0.858297 | 0.858297 0.858297 0.858297 0.955251 ]
~ normamps=135

New Linecode.BT_2ACSR_ACSR_6_1 nphases=2 units=km
~ rmatrix = [ 114356.0 0.186603 | 0.186603 113928.0 ]
~ xmatrix = [ 0.814514 0.375257 | 0.375257 0.819764 ]
~ cmatrix = [ 7.864529999999999 -2.10588 | -2.10588 7.7588 ]
~ normamps=184

New Linecode.BT_2ACSR_ACSR_6_3 nphases=3 units=km
~ rmatrix = [ 110893.0 0.05856 0.05856 | 0.05856 110893.0 0.05856 | 0.05856 0.05856 11551875.0 ]
~ xmatrix = [ 0.960625 0.863125 0.87 | 0.863125 0.960625 0.87 | 0.87 0.87 0.9501875 ]
~ normamps=150

New Linecode.BT_2ACSR_NE_NE_1 nphases=2 units=km
~ rmatrix = [ 114356.0 0.186603 | 0.186603 113928.0 ]
~ xmatrix = [ 0.814514 0.375257 | 0.375257 0.819764 ]
~ cmatrix = [ 7.864529999999999 -2.10588 | -2.10588 7.7588 ]
~ normamps=150

New Linecode.BT_2CO_SO_ACSR_2_6 nphases=2 units=km
~ rmatrix = [ 0.71224363 0.059229335 0.059229335 | 0.059229335 0.71224363 0.059229335 | 0.059229335 0.059229335 0.71224363 ]
~ xmatrix = [ 0.933126165 0.839341206 0.84922312 | 0.839341206 0.933126165 0.84922312 | 0.84922312 0.84922312 0.933126165 ]
~ normamps=247

New Linecode.BT_2CO_TR_CO_TR_1/0_1 nphases=2 units=km
~ rmatrix = [ 114356.0 0.186603 | 0.186603 113928.0 ]
~ xmatrix = [ 0.814514 0.375257 | 0.375257 0.819764 ]
~ cmatrix = [ 7.864529999999999 -2.10588 | -2.10588 7.7588 ]
~ normamps=150

New Linecode.BT_2/0ACSR_ACSR_2/0_1 nphases=2 units=km
~ rmatrix = [ 0.603787 0.1399 | 0.1399 0.600592 ]
~ xmatrix = [ 0.707766 0.284904 | 0.284904 0.715779 ]
~ cmatrix = [ 8.12924 -2.21031 | -2.21031 8.01481 ]
~ normamps=276

New Linecode.BT_4ACSR_ACSR_4_1 nphases=2 units=km
~ rmatrix = [ 166587.0 0.187005 | 0.187005 166177.0 ]
~ xmatrix = [ 0.878068 0.441203 | 0.441203 0.881403 ]
~ cmatrix = [ 7.922149999999999 -2.12854 | -2.12854 7.81456 ]
~ normamps=140

New Linecode.BT_4ACSR_ACSR_4_3 nphases=3 units=km
~ rmatrix = [ 173947.0 0.05923 0.05923 | 0.05923 173947.0 0.05923 | 0.05923 0.05923 17590625.0 ]
~ xmatrix = [ 0.978 0.87606 0.8850625 | 0.87606 0.978 0.8850625 | 0.8850625 0.8850625 0.967875 ]
~ normamps=115

New Linecode.BT_6AAAC_AAAC_123.3_3 nphases=3 units=km
~ rmatrix = [ 27160625.0 0.0595625 0.0595625 | 0.0595625 27160625.0 0.0595625 | 0.0595625 0.0595625 2719375.0 ]
~ xmatrix = [ 0.99493 0.8883125 0.899625 | 0.8883125 0.99493 0.899625 | 0.899625 0.899625 0.9848125 ]
~ normamps=85

New Linecode.BT_6AAAC_AAAC_123.3_6 nphases=2 units=km
~ rmatrix = [ 27160625.0 0.0595625 0.0595625 | 0.0595625 27160625.0 0.0595625 | 0.0595625 0.0595625 2719375.0 ]
~ xmatrix = [ 0.99493 0.8883125 0.899625 | 0.8883125 0.99493 0.899625 | 0.899625 0.899625 0.9848125 ]
~ normamps=85

New Linecode.BT_6AAAC_AAAC_6_3 nphases=3 units=km
~ rmatrix = [ 27160625.0 0.0595625 0.0595625 | 0.0595625 27160625.0 0.0595625 | 0.0595625 0.0595625 2719375.0 ]
~ xmatrix = [ 0.99493 0.8883125 0.899625 | 0.8883125 0.99493 0.899625 | 0.899625 0.899625 0.9848125 ]
~ normamps=85

New Linecode.BT_6AAAC_AAAC_6_6 nphases=2 units=km
~ rmatrix = [ 27160625.0 0.0595625 0.0595625 | 0.0595625 27160625.0 0.0595625 | 0.0595625 0.0595625 2719375.0 ]
~ xmatrix = [ 0.99493 0.8883125 0.899625 | 0.8883125 0.99493 0.899625 | 0.899625 0.899625 0.9848125 ]
~ normamps=85

New Linecode.BT_6AAAC_ACSR_2_3 nphases=3 units=km
~ rmatrix = [ 27160625.0 0.0595625 0.0595625 | 0.0595625 27160625.0 0.0595625 | 0.0595625 0.0595625 2719375.0 ]
~ xmatrix = [ 0.99493 0.8883125 0.899625 | 0.8883125 0.99493 0.899625 | 0.899625 0.899625 0.9848125 ]
~ normamps=85

New Linecode.BT_6AAAC_ACSR_2_6 nphases=2 units=km
~ rmatrix = [ 27160625.0 0.0595625 0.0595625 | 0.0595625 27160625.0 0.0595625 | 0.0595625 0.0595625 2719375.0 ]
~ xmatrix = [ 0.99493 0.8883125 0.899625 | 0.8883125 0.99493 0.899625 | 0.899625 0.899625 0.9848125 ]
~ normamps=85

New Linecode.BT_6AAAC_ACSR_6_3 nphases=3 units=km
~ rmatrix = [ 27160625.0 0.0595625 0.0595625 | 0.0595625 27160625.0 0.0595625 | 0.0595625 0.0595625 2719375.0 ]
~ xmatrix = [ 0.99493 0.8883125 0.899625 | 0.8883125 0.99493 0.899625 | 0.899625 0.899625 0.9848125 ]
~ normamps=85

New Linecode.BT_6AAAC_ACSR_6_6 nphases=2 units=km
~ rmatrix = [ 27160625.0 0.0595625 0.0595625 | 0.0595625 27160625.0 0.0595625 | 0.0595625 0.0595625 2719375.0 ]
~ xmatrix = [ 0.99493 0.8883125 0.899625 | 0.8883125 0.99493 0.899625 | 0.899625 0.899625 0.9848125 ]
~ normamps=85

New Linecode.BT_6AAAC_CO_TR_1/0_6 nphases=2 units=km
~ rmatrix = [ 27160625.0 0.0595625 0.0595625 | 0.0595625 27160625.0 0.0595625 | 0.0595625 0.0595625 2719375.0 ]
~ xmatrix = [ 0.99493 0.8883125 0.899625 | 0.8883125 0.99493 0.899625 | 0.899625 0.899625 0.9848125 ]
~ normamps=110

New Linecode.BT_6ACSR_AAAC_123.3_3 nphases=3 units=km
~ rmatrix = [ 27160625.0 0.0595625 0.0595625 | 0.0595625 27160625.0 0.0595625 | 0.0595625 0.0595625 2719375.0 ]
~ xmatrix = [ 0.99493 0.8883125 0.899625 | 0.8883125 0.99493 0.899625 | 0.899625 0.899625 0.9848125 ]
~ normamps=85

New Linecode.BT_6ACSR_AAAC_6_3 nphases=3 units=km
~ rmatrix = [ 27160625.0 0.0595625 0.0595625 | 0.0595625 27160625.0 0.0595625 | 0.0595625 0.0595625 2719375.0 ]
~ xmatrix = [ 0.99493 0.8883125 0.899625 | 0.8883125 0.99493 0.899625 | 0.899625 0.899625 0.9848125 ]
~ normamps=85

New Linecode.BT_6ACSR_ACSR_1/0_1 nphases=2 units=km
~ rmatrix = [ 243266.0 0.16622 | 0.16622 242933.0 ]
~ xmatrix = [ 0.934777 0.493465 | 0.493465 0.936657 ]
~ cmatrix = [ 7.85857 -2.10354 | -2.10354 7.75303 ]
~ normamps=105

New Linecode.BT_6ACSR_ACSR_1/0_3 nphases=3 units=km
~ rmatrix = [ 27160625.0 0.0595625 0.0595625 | 0.0595625 27160625.0 0.0595625 | 0.0595625 0.0595625 2719375.0 ]
~ xmatrix = [ 0.99493 0.8883125 0.899625 | 0.8883125 0.99493 0.899625 | 0.899625 0.899625 0.9848125 ]
~ normamps=85

New Linecode.BT_6ACSR_ACSR_2_1 nphases=2 units=km
~ rmatrix = [ 245352.0 0.186603 | 0.186603 244924.0 ]
~ xmatrix = [ 0.814872 0.375257 | 0.375257 0.820122 ]
~ cmatrix = [ 7.859 -2.10314 | -2.10314 7.7534 ]
~ normamps=85

New Linecode.BT_6ACSR_ACSR_2_3 nphases=3 units=km
~ rmatrix = [ 27160625.0 0.0595625 0.0595625 | 0.0595625 27160625.0 0.0595625 | 0.0595625 0.0595625 2719375.0 ]
~ xmatrix = [ 0.99493 0.8883125 0.899625 | 0.8883125 0.99493 0.899625 | 0.899625 0.899625 0.9848125 ]
~ normamps=85

New Linecode.BT_6ACSR_ACSR_2_4 nphases=3 units=km
~ rmatrix = [ 27160625.0 0.0595625 0.0595625 0.0595625 | 0.0595625 27160625.0 0.0595625 0.0595625 | 0.0595625 0.0595625 275375.0 0.0595625 | 0.0595625 0.0595625 0.0595625 275375.0 ]
~ xmatrix = [ 0.9949375 0.8883125 0.851625 0.851625 | 0.8883125 0.938375 0.851625 0.851625 | 0.851625 0.851625 0.9328125 0.851625 | 0.851625 0.851625 0.851625 0.9328125 ]
~ normamps=75

New Linecode.BT_6ACSR_ACSR_2_6 nphases=2 units=km
~ rmatrix = [ 27160625.0 0.0595625 0.0595625 | 0.0595625 27160625.0 0.0595625 | 0.0595625 0.0595625 2719375.0 ]
~ xmatrix = [ 0.99493 0.8883125 0.899625 | 0.8883125 0.99493 0.899625 | 0.899625 0.899625 0.9848125 ]
~ normamps=85

New Linecode.BT_6ACSR_ACSR_6_1 nphases=2 units=km
~ rmatrix = [ 243266.0 0.16622 | 0.16622 242933.0 ]
~ xmatrix = [ 0.934777 0.493465 | 0.493465 0.936657 ]
~ cmatrix = [ 7.85857 -2.10354 | -2.10354 7.75303 ]
~ normamps=85

New Linecode.BT_6ACSR_ACSR_6_2 nphases=2 units=km
~ rmatrix = [ 270029.0 0.0592176 | 0.0592176 270357.0 ]
~ xmatrix = [ 0.989109 0.910348 | 0.910348 0.979041 ]
~ normamps=85

New Linecode.BT_6ACSR_ACSR_6_3 nphases=3 units=km
~ rmatrix = [ 27160625.0 0.0595625 0.0595625 | 0.0595625 27160625.0 0.0595625 | 0.0595625 0.0595625 2719375.0 ]
~ xmatrix = [ 0.99493 0.8883125 0.899625 | 0.8883125 0.99493 0.899625 | 0.899625 0.899625 0.9848125 ]
~ normamps=85

New Linecode.BT_6ACSR_ACSR_6_4 nphases=3 units=km
~ rmatrix = [ 27160625.0 0.0595625 0.0595625 0.0595625 | 0.0595625 27160625.0 0.0595625 0.0595625 | 0.0595625 0.0595625 275375.0 0.0595625 | 0.0595625 0.0595625 0.0595625 275375.0 ]
~ xmatrix = [ 0.9949375 0.8883125 0.851625 0.851625 | 0.8883125 0.938375 0.851625 0.851625 | 0.851625 0.851625 0.9328125 0.851625 | 0.851625 0.851625 0.851625 0.9328125 ]
~ normamps=75

New Linecode.BT_6ACSR_ACSR_6_6 nphases=2 units=km
~ rmatrix = [ 270029.0 0.0592176 | 0.0592176 270357.0 ]
~ xmatrix = [ 0.989109 0.910348 | 0.910348 0.979041 ]
~ normamps=85

New Linecode.BT_6ACSR_ACSR_8_6 nphases=2 units=km
~ rmatrix = [ 27160625.0 0.0595625 0.0595625 | 0.0595625 27160625.0 0.0595625 | 0.0595625 0.0595625 2719375.0 ]
~ xmatrix = [ 0.99493 0.8883125 0.899625 | 0.8883125 0.99493 0.899625 | 0.899625 0.899625 0.9848125 ]
~ normamps=85

New Linecode.BT_6ACSR_CO_TR_1/0_1 nphases=2 units=km
~ rmatrix = [ 239198.0 0.12575 | 0.12575 238907.0 ]
~ xmatrix = [ 0.683128 0.245503 | 0.245503 0.692327 ]
~ cmatrix = [ 7.988840000000001 -1.9815000000000003 | -1.9815000000000003 7.867020000000001 ]
~ normamps=85

New Linecode.BT_6ACSR_CO_TR_8_3 nphases=3 units=km
~ rmatrix = [ 27160625.0 0.0595625 0.0595625 | 0.0595625 27160625.0 0.0595625 | 0.0595625 0.0595625 2719375.0 ]
~ xmatrix = [ 0.99493 0.8883125 0.899625 | 0.8883125 0.99493 0.899625 | 0.899625 0.899625 0.9848125 ]
~ normamps=85

New Linecode.BT_6CO_TR_ACSR_6_3 nphases=3 units=km
~ rmatrix = [ 1381370297.0 0.059216675 0.059216675 | 0.059216675 1381370297.0 0.059216675 | 0.059216675 0.059216675 1381370297.0 ]
~ xmatrix = [ 0.989906446 0.883154876 0.883154876 | 0.883154876 0.989906446 0.883154876 | 0.883154876 0.883154876 0.989906446 ]
~ normamps=85

New Linecode.BT_6CO_TR_CO_TR_1/0_1 nphases=2 units=km
~ rmatrix = [ 150758.0 0.12575 | 0.12575 150467.0 ]
~ xmatrix = [ 0.665438 0.245503 | 0.245503 0.674638 ]
~ cmatrix = [ 8.28573 -2.1211200000000003 | -2.1211200000000003 8.155330000000001 ]
~ normamps=125

New Linecode.BT_6CO_TR_CO_TR_6_6 nphases=2 units=km
~ rmatrix = [ 1381370297.0 0.059216675 0.059216675 | 0.059216675 1381370297.0 0.059216675 | 0.059216675 0.059216675 1381370297.0 ]
~ xmatrix = [ 0.989906446 0.883154876 0.883154876 | 0.883154876 0.989906446 0.883154876 | 0.883154876 0.883154876 0.989906446 ]
~ normamps=95

New Linecode.BT_77.4AAAC_AAAC_77.4_1 nphases=2 units=km
~ rmatrix = [ 109682.0 0.195216 | 0.195216 109225.0 ]
~ xmatrix = [ 0.740598 0.363774 | 0.363774 0.746155 ]
~ cmatrix = [ 9.10418 -2.60111 | -2.60111 8.95445 ]
~ normamps=191

New Linecode.BT_8ACSR_ACSR_8_6 nphases=2 units=km
~ rmatrix = [ 2.43 0.059223 | 0.059223 2.43 ]
~ xmatrix = [ 10076.0 0.91093847 | 0.91093847 10076.0 ]
~ normamps=85

New Linecode.BT_8CO_TR_CO_TR_8_3 nphases=3 units=km
~ rmatrix = [ 242921.0 0.059229 0.059229 | 0.059229 242921.0 0.059229 | 0.059229 0.059229 242921.0 ]
~ xmatrix = [ 100758.0 0.89496 0.9109385 | 0.89496 100758.0 0.9109385 | 0.9109385 0.9109385 100758.0 ]
~ normamps=85

New Linecode.BT_8CO_TR_CO_TR_8_6 nphases=2 units=km
~ rmatrix = [ 230622.0 0.0592176 | 0.0592176 230622.0 ]
~ xmatrix = [ 0.963229 0.892098 | 0.892098 0.963229 ]
~ normamps=45

New Linecode.BT_SUB_ABC:_250COBRE_RHH_COBRE_250 nphases=3 units=km
~ rmatrix = [ 0.5127883 0.1533377 0.1533377 0.1533377 | 0.1533377 0.5127883 0.1533377 0.1533377 | 0.1533377 0.1533377 0.5127883 0.1533377 | 0.1533377 0.1533377 0.1533377 0.5127883 ]
~ xmatrix = [ 23290275.0 20862294.0 20862294.0 20862294.0 | 20862294.0 23290275.0 20862294.0 20862294.0 | 20862294.0 20862294.0 23290275.0 20862294.0 | 20862294.0 20862294.0 20862294.0 23290275.0 ]
~ normamps=290

New Linecode.BT_SUB_ABC:_250COBRERHH_COBRE_250 nphases=3 units=km
~ rmatrix = [ 0.5127883 0.1533377 0.1533377 0.1533377 | 0.1533377 0.5127883 0.1533377 0.1533377 | 0.1533377 0.1533377 0.5127883 0.1533377 | 0.1533377 0.1533377 0.1533377 0.5127883 ]
~ xmatrix = [ 23290275.0 20862294.0 20862294.0 20862294.0 | 20862294.0 23290275.0 20862294.0 20862294.0 | 20862294.0 20862294.0 23290275.0 20862294.0 | 20862294.0 20862294.0 20862294.0 23290275.0 ]
~ normamps=290

New Linecode.BT_SUB_A:_1/0COBRERHH_1/0 nphases=1 units=km
~ rmatrix = [ 0.388004972 0.059229335 0.059229335 | 0.059229335 0.388004972 0.059229335 | 0.059229335 0.059229335 0.388004972 ]
~ xmatrix = [ 0.933312617 0.833188316 0.833188316 | 0.833188316 0.933312617 0.833188316 | 0.833188316 0.833188316 0.933312617 ]
~ normamps=170

New Linecode.BT_SUB_A:_2COBRERHH_2 nphases=1 units=km
~ rmatrix = [ 0.582224807 0.059216675 0.059216675 | 0.059216675 0.582224807 0.059216675 | 0.059216675 0.059216675 0.582224807 ]
~ xmatrix = [ 0.954861111 0.852397002 0.852397002 | 0.852397002 0.954861111 0.852397002 | 0.852397002 0.852397002 0.954861111 ]
~ normamps=130

New Linecode.BT_SUB_A:_250COBRERHH_250 nphases=1 units=km
~ rmatrix = [ 0.198030999 0.059216675 0.059216675 | 0.059216675 0.198030999 0.059216675 | 0.059216675 0.059216675 0.198030999 ]
~ xmatrix = [ 0.899434801 0.805669888 0.805669888 | 0.805669888 0.899434801 0.805669888 | 0.805669888 0.805669888 0.899434801 ]
~ normamps=290

New Linecode.BT_SUB_ABC:_1/0COBRERHH_1/0 nphases=3 units=km
~ rmatrix = [ 0.541430835 0.059229335 0.059229335 0.059229335 | 0.059229335 0.541430835 0.059229335 0.059229335 | 0.059229335 0.059229335 0.541430835 0.059229335 | 0.059229335 0.059229335 0.059229335 0.541430835 ]
~ xmatrix = [ 0.942200124 0.833188316 0.833188316 0.833188316 | 0.833188316 0.942200124 0.833188316 0.833188316 | 0.833188316 0.833188316 0.942200124 0.833188316 | 0.833188316 0.833188316 0.833188316 0.942200124 ]
~ normamps=150

New Linecode.BT_SUB_ABC:_2COBRERHH_2 nphases=3 units=km
~ rmatrix = [ 0.582349285 0.059229335 0.059229335 0.059229335 | 0.059229335 0.582349285 0.059229335 0.059229335 | 0.059229335 0.059229335 0.582349285 0.059229335 | 0.059229335 0.059229335 0.059229335 0.582349285 ]
~ xmatrix = [ 0.955065258 0.852579242 0.852579242 0.852579242 | 0.852579242 0.955065258 0.852579242 0.852579242 | 0.852579242 0.852579242 0.955065258 0.852579242 | 0.852579242 0.852579242 0.852579242 0.955065258 ]
~ normamps=130

New Linecode.BT_SUB_B:_1/0COBRERHH_1/0 nphases=1 units=km
~ rmatrix = [ 0.388004972 0.059229335 0.059229335 | 0.059229335 0.388004972 0.059229335 | 0.059229335 0.059229335 0.388004972 ]
~ xmatrix = [ 0.933312617 0.833188316 0.833188316 | 0.833188316 0.933312617 0.833188316 | 0.833188316 0.833188316 0.933312617 ]
~ normamps=170

New Linecode.BT_SUB_B:_2COBRERHH_2 nphases=1 units=km
~ rmatrix = [ 0.582224807 0.059216675 0.059216675 | 0.059216675 0.582224807 0.059216675 | 0.059216675 0.059216675 0.582224807 ]
~ xmatrix = [ 0.954861111 0.852397002 0.852397002 | 0.852397002 0.954861111 0.852397002 | 0.852397002 0.852397002 0.954861111 ]
~ normamps=130

New Linecode.BT_SUB_C:_1/0COBRERHH_1/0 nphases=1 units=km
~ rmatrix = [ 0.388004972 0.059229335 0.059229335 | 0.059229335 0.388004972 0.059229335 | 0.059229335 0.059229335 0.388004972 ]
~ xmatrix = [ 0.933312617 0.833188316 0.833188316 | 0.833188316 0.933312617 0.833188316 | 0.833188316 0.833188316 0.933312617 ]
~ normamps=170

New Linecode.BT_SUB_C:_2COBRERHH_2 nphases=1 units=km
~ rmatrix = [ 0.582224807 0.059216675 0.059216675 | 0.059216675 0.582224807 0.059216675 | 0.059216675 0.059216675 0.582224807 ]
~ xmatrix = [ 0.954861111 0.852397002 0.852397002 | 0.852397002 0.954861111 0.852397002 | 0.852397002 0.852397002 0.954861111 ]
~ normamps=130

New Linecode.MT_A:1/0AAAC_AAAC_1/0_NT_NT_7_N nphases=1 units=km
~ rmatrix = [ 0.706564 ]
~ xmatrix = [ 0.829416 ]
~ cmatrix = [ 6.7936000000000005 ]
~ normamps=256

New Linecode.MT_A:1/0AAAC_AAAC_123.3_NT_NT_7_N nphases=1 units=km
~ rmatrix = [ 0.694847 ]
~ xmatrix = [ 0.789622 ]
~ cmatrix = [ 6.8199000000000005 ]
~ normamps=256

New Linecode.MT_A:1/0AAAC_AAAC_2_NT_NT_7_N nphases=1 units=km
~ rmatrix = [ 0.710078 ]
~ xmatrix = [ 0.82243 ]
~ cmatrix = [ 6.81346 ]
~ normamps=256

New Linecode.MT_A:1/0AAAC_ACSR_2_NT_NT_7_N nphases=1 units=km
~ rmatrix = [ 0.706564 ]
~ xmatrix = [ 0.829416 ]
~ cmatrix = [ 6.7936000000000005 ]
~ normamps=256

New Linecode.MT_A:1/0AAAC_ACSR_2_NT_NT_7_Y nphases=1 units=km
~ rmatrix = [ 0.706564 ]
~ xmatrix = [ 0.829416 ]
~ cmatrix = [ 6.7936000000000005 ]
~ normamps=256

New Linecode.MT_A:1/0AAAC_NT_NT_NT_NT_7_N nphases=1 units=km
~ rmatrix = [ 0.706564 ]
~ xmatrix = [ 0.829416 ]
~ cmatrix = [ 6.7936000000000005 ]
~ normamps=256

New Linecode.MT_A:1/0AAAC_NT_NT_NT_NT_7_Y nphases=1 units=km
~ rmatrix = [ 0.706564 ]
~ xmatrix = [ 0.829416 ]
~ cmatrix = [ 6.7936000000000005 ]
~ normamps=256

New Linecode.MT_A:1/0AAAC_NT_NT_NT_NT_NE_N nphases=1 units=km
~ rmatrix = [ 0.706564 ]
~ xmatrix = [ 0.829416 ]
~ cmatrix = [ 6.7936000000000005 ]
~ normamps=256

New Linecode.MT_A:1/0ACSR_AAAC_123.3_NT_NT_7_N nphases=1 units=km
~ rmatrix = [ 0.68338 ]
~ xmatrix = [ 0.86438 ]
~ cmatrix = [ 6.08078 ]
~ normamps=242

New Linecode.MT_A:1/0ACSR_AAAC_123.3_NT_NT_7_Y nphases=1 units=km
~ rmatrix = [ 0.68338 ]
~ xmatrix = [ 0.86438 ]
~ cmatrix = [ 6.08078 ]
~ normamps=242

New Linecode.MT_A:1/0ACSR_AAAC_2_NT_NT_7_N nphases=1 units=km
~ rmatrix = [ 0.68338 ]
~ xmatrix = [ 0.86438 ]
~ cmatrix = [ 6.08078 ]
~ normamps=242

New Linecode.MT_A:1/0ACSR_ACSR_1/0_NT_NT_7_N nphases=1 units=km
~ rmatrix = [ 0.677772 ]
~ xmatrix = [ 0.872159 ]
~ cmatrix = [ 6.061000000000001 ]
~ normamps=242

New Linecode.MT_A:1/0ACSR_ACSR_1/0_NT_NT_7_Y nphases=1 units=km
~ rmatrix = [ 0.677772 ]
~ xmatrix = [ 0.872159 ]
~ cmatrix = [ 6.061000000000001 ]
~ normamps=242

New Linecode.MT_A:1/0ACSR_ACSR_2_NT_NT_7_N nphases=1 units=km
~ rmatrix = [ 0.706564 ]
~ xmatrix = [ 0.829416 ]
~ cmatrix = [ 6.7936000000000005 ]
~ normamps=242

New Linecode.MT_A:1/0ACSR_ACSR_2_NT_NT_7_Y nphases=1 units=km
~ rmatrix = [ 0.706564 ]
~ xmatrix = [ 0.829416 ]
~ cmatrix = [ 6.7936000000000005 ]
~ normamps=242

New Linecode.MT_A:1/0ACSR_NT_NT_NT_NT_7_N nphases=1 units=km
~ rmatrix = [ 0.706564 ]
~ xmatrix = [ 0.829416 ]
~ cmatrix = [ 6.7936000000000005 ]
~ normamps=242

New Linecode.MT_A:1/0ACSR_NT_NT_NT_NT_7_Y nphases=1 units=km
~ rmatrix = [ 0.706564 ]
~ xmatrix = [ 0.829416 ]
~ cmatrix = [ 6.7936000000000005 ]
~ normamps=242

New Linecode.MT_A:1/0ACSR_NT_NT_NT_NT_NE_N nphases=1 units=km
~ rmatrix = [ 0.706564 ]
~ xmatrix = [ 0.829416 ]
~ cmatrix = [ 6.7936000000000005 ]
~ normamps=242

New Linecode.MT_A:123.3AAAC_AAAC_123.3_NT_NT_7_N nphases=1 units=km
~ rmatrix = [ 0.665147 ]
~ xmatrix = [ 0.789499 ]
~ cmatrix = [ 6.82127 ]
~ normamps=256

New Linecode.MT_A:123.3AAAC_AAAC_123.3_NT_NT_7_Y nphases=1 units=km
~ rmatrix = [ 0.665147 ]
~ xmatrix = [ 0.789499 ]
~ cmatrix = [ 6.82127 ]
~ normamps=256

New Linecode.MT_A:123.3AAAC_AAAC_77.4_NT_NT_7_N nphases=1 units=km
~ rmatrix = [ 0.680663 ]
~ xmatrix = [ 0.823203 ]
~ cmatrix = [ 6.8149 ]
~ normamps=256

New Linecode.MT_A:123.3AAAC_AAAC_77.4_NT_NT_7_Y nphases=1 units=km
~ rmatrix = [ 0.680663 ]
~ xmatrix = [ 0.823203 ]
~ cmatrix = [ 6.8149 ]
~ normamps=256

New Linecode.MT_A:123.3AAAC_ACSR_1/0_NT_NT_7_Y nphases=1 units=km
~ rmatrix = [ 0.659539 ]
~ xmatrix = [ 0.797278 ]
~ cmatrix = [ 6.796390000000001 ]
~ normamps=256

New Linecode.MT_A:123.3AAAC_ACSR_2_NT_NT_7_N nphases=1 units=km
~ rmatrix = [ 0.676864 ]
~ xmatrix = [ 0.829292 ]
~ cmatrix = [ 6.79496 ]
~ normamps=256

New Linecode.MT_A:123.3AAAC_NT_NT_NT_NT_7_Y nphases=1 units=km
~ rmatrix = [ 0.676864 ]
~ xmatrix = [ 0.829292 ]
~ cmatrix = [ 6.79496 ]
~ normamps=256

New Linecode.MT_A:2ACSR_ACSR_2_NT_NT_1_N nphases=1 units=km
~ rmatrix = [ 106916.0 ]
~ xmatrix = [ 0.909066 ]
~ cmatrix = [ 6.01733 ]
~ normamps=184

New Linecode.MT_A:2ACSR_ACSR_2_NT_NT_7_N nphases=1 units=km
~ rmatrix = [ 106916.0 ]
~ xmatrix = [ 0.909066 ]
~ cmatrix = [ 6.01733 ]
~ normamps=184

New Linecode.MT_A:2ACSR_ACSR_2_NT_NT_7_Y nphases=1 units=km
~ rmatrix = [ 106916.0 ]
~ xmatrix = [ 0.909066 ]
~ cmatrix = [ 6.01733 ]
~ normamps=184

New Linecode.MT_A:6AAAC_NT_NT_NT_NT_NE_N nphases=1 units=km
~ rmatrix = [ 1719701678.0 0.059229335 | 0.059229335 1676693599.0 ]
~ xmatrix = [ 0.972529521 0.880360472 | 0.880360472 0.967308888 ]
~ normamps=85

New Linecode.MT_A:6CO_SO_NT_NT_NT_NT_NE_N nphases=1 units=km
~ rmatrix = [ 24292.0 0.0923 | 0.0923 24292.0 ]
~ xmatrix = [ 10076.0 0.910938 | 0.910938 10076.0 ]
~ normamps=85

New Linecode.MT_A:6CO_TR_NT_NT_NT_NT_NE_N nphases=1 units=km
~ rmatrix = [ 149472.0 ]
~ xmatrix = [ 0.891734 ]
~ cmatrix = [ 6.17076 ]
~ normamps=409

New Linecode.MT_AB:1/0AAAC_NT_NT_AAAC_1/0_NE_N nphases=2 units=km
~ rmatrix = [ 0.639951 0.0592176 | 0.0592176 101402.0 ]
~ xmatrix = [ 100627.0 0.53736 | 0.53736 101116.0 ]
~ cmatrix = [ 7.38061 -1.81775 | -1.81775 7.55931 ]
~ normamps=256

New Linecode.MT_AB:1/0ACSR_ACSR_2_NT_NT_6_N nphases=2 units=km
~ rmatrix = [ 0.639951 0.0592176 | 0.0592176 101402.0 ]
~ xmatrix = [ 100627.0 0.53736 | 0.53736 101116.0 ]
~ cmatrix = [ 7.38061 -1.81775 | -1.81775 7.55931 ]
~ normamps=242

New Linecode.MT_AB:6CO_SO_NT_NT_NT_NT_NE_N nphases=2 units=km
~ rmatrix = [ 1381665631.0 0.059229335 0.059229335 | 0.059229335 1381665631.0 0.059229335 | 0.059229335 0.059229335 1381665631.0 ]
~ xmatrix = [ 0.990118086 0.883343692 0.883343692 | 0.883343692 0.990118086 0.883343692 | 0.883343692 0.883343692 0.990118086 ]
~ normamps=110

New Linecode.MT_ABC:1/0AAAC_AAAC_1/0_NT_NT_4_N nphases=3 units=km
~ rmatrix = [ 0.015905 0.0156016 0.015905 | 0.0156016 0.0153039 0.0156016 | 0.015905 0.0156016 0.015905 ]
~ xmatrix = [ 0.717276 0.315296 0.233545 | 0.315296 0.708274 0.25803 | 0.233545 0.25803 0.717276 ]
~ cmatrix = [ 8.32111 -2.65349 -1.04009 | -2.65349 8.57455 -1.59999 | -1.04009 -1.59999 7.798509999999999 ]
~ normamps=256

New Linecode.MT_ABC:1/0AAAC_AAAC_123.3_NT_NT_4_N nphases=3 units=km
~ rmatrix = [ 0.709697 0.11914 0.117497 | 0.11914 0.713025 0.11914 | 0.117497 0.11914 0.709697 ]
~ xmatrix = [ 0.758904 0.35804 0.275174 | 0.35804 0.752161 0.300773 | 0.275174 0.300773 0.758904 ]
~ cmatrix = [ 8.32115 -2.65345 -1.0400500000000001 | -2.65345 8.57459 -1.59995 | -1.0400500000000001 -1.59995 7.79856 ]
~ normamps=256

New Linecode.MT_ABC:1/0AAAC_AAAC_2_NT_NT_4_N nphases=3 units=km
~ rmatrix = [ 0.135038 0.136927 0.135038 | 0.136927 0.13886 0.136927 | 0.135038 0.136927 0.135038 ]
~ xmatrix = [ 0.799702 0.399711 0.315971 | 0.399711 0.794723 0.342444 | 0.315971 0.342444 0.794723 ]
~ cmatrix = [ 8.31637 -2.6586499999999997 -1.04547 | -2.6586499999999997 8.568940000000001 -1.6058400000000002 | -1.04547 -1.6058400000000002 7.792420000000001 ]
~ normamps=256

New Linecode.MT_ABC:1/0AAAC_ACSR_2_NT_NT_4_N nphases=3 units=km
~ rmatrix = [ 0.13048 0.132254 0.13048 | 0.132254 0.13407 0.132254 | 0.13048 0.132254 0.13048 ]
~ xmatrix = [ 0.808152 0.40832 0.324421 | 0.40832 0.803494 0.351053 | 0.324421 0.351053 0.808152 ]
~ cmatrix = [ 8.30181 -2.67449 -1.06197 | -2.67449 8.5517 -1.62381 | -1.06197 -1.62381 7.7737099999999995 ]
~ normamps=256

New Linecode.MT_ABC:1/0AAAC_NT_NT_NT_NT_4_Y nphases=3 units=km
~ rmatrix = [ 0.13048 0.132254 0.13048 | 0.132254 0.13407 0.132254 | 0.13048 0.132254 0.13048 ]
~ xmatrix = [ 0.808152 0.40832 0.324421 | 0.40832 0.803494 0.351053 | 0.324421 0.351053 0.808152 ]
~ cmatrix = [ 8.30181 -2.67449 -1.06197 | -2.67449 8.5517 -1.62381 | -1.06197 -1.62381 7.7737099999999995 ]
~ normamps=256

New Linecode.MT_ABC:1/0AAAC_NT_NT_NT_NT_NE_N nphases=3 units=km
~ rmatrix = [ 0.13048 0.132254 0.13048 | 0.132254 0.13407 0.132254 | 0.13048 0.132254 0.13048 ]
~ xmatrix = [ 0.808152 0.40832 0.324421 | 0.40832 0.803494 0.351053 | 0.324421 0.351053 0.808152 ]
~ cmatrix = [ 8.30181 -2.67449 -1.06197 | -2.67449 8.5517 -1.62381 | -1.06197 -1.62381 7.7737099999999995 ]
~ normamps=256

New Linecode.MT_ABC:1/0ACSR_AAAC_123.3_NT_NT_4_N nphases=3 units=km
~ rmatrix = [ 0.698231 0.11914 0.117497 | 0.11914 0.701559 0.11914 | 0.117497 0.11914 0.698231 ]
~ xmatrix = [ 0.833662 0.35804 0.275174 | 0.35804 0.826919 0.300773 | 0.275174 0.300773 0.833662 ]
~ cmatrix = [ 7.14919 -2.02939 -0.847592 | -2.02939 7.3236300000000005 -1.25438 | -0.847592 -1.25438 6.8017 ]
~ normamps=242

New Linecode.MT_ABC:1/0ACSR_AAAC_123.3_NT_NT_4_Y nphases=3 units=km
~ rmatrix = [ 0.698231 0.11914 0.117497 | 0.11914 0.701559 0.11914 | 0.117497 0.11914 0.698231 ]
~ xmatrix = [ 0.833662 0.35804 0.275174 | 0.35804 0.826919 0.300773 | 0.275174 0.300773 0.833662 ]
~ cmatrix = [ 7.14919 -2.02939 -0.847592 | -2.02939 7.3236300000000005 -1.25438 | -0.847592 -1.25438 6.8017 ]
~ normamps=242

New Linecode.MT_ABC:1/0ACSR_AAAC_195.7_NT_NT_4_N nphases=3 units=km
~ rmatrix = [ 0.662689 0.0829696 0.0819556 | 0.0829696 0.664749 0.0829696 | 0.0819556 0.0829696 0.662689 ]
~ xmatrix = [ 0.799629 0.533989 0.323223 | 0.533989 0.791299 0.265956 | 0.323223 0.265956 0.799629 ]
~ cmatrix = [ 7.1535 -2.02471 -0.842784 | -2.02471 7.3286999999999995 -1.24917 | -0.842784 -1.24917 6.80705 ]
~ normamps=242

New Linecode.MT_ABC:1/0ACSR_AAAC_195.7_NT_NT_4_Y nphases=3 units=km
~ rmatrix = [ 0.662689 0.0829696 0.0819556 | 0.0829696 0.664749 0.0829696 | 0.0819556 0.0829696 0.662689 ]
~ xmatrix = [ 0.799629 0.533989 0.323223 | 0.533989 0.791299 0.265956 | 0.323223 0.265956 0.799629 ]
~ cmatrix = [ 7.1535 -2.02471 -0.842784 | -2.02471 7.3286999999999995 -1.24917 | -0.842784 -1.24917 6.80705 ]
~ normamps=242

New Linecode.MT_ABC:1/0ACSR_ACSR_1/0_NT_NT_1_N nphases=3 units=km
~ rmatrix = [ 0.711213 0.132254 0.13048 | 0.132254 0.714803 0.132254 | 0.13048 0.132254 0.711213 ]
~ xmatrix = [ 0.882909 0.40832 0.324421 | 0.40832 0.878252 0.351053 | 0.324421 0.351053 0.882909 ]
~ cmatrix = [ 7.13338 -2.04653 -0.8652150000000001 | -2.04653 7.3050299999999995 -1.2734999999999999 | -0.8652150000000001 -1.2734999999999999 6.782050000000001 ]
~ normamps=242

New Linecode.MT_ABC:1/0ACSR_ACSR_1/0_NT_NT_1_Y nphases=3 units=km
~ rmatrix = [ 0.711213 0.132254 0.13048 | 0.132254 0.714803 0.132254 | 0.13048 0.132254 0.711213 ]
~ xmatrix = [ 0.882909 0.40832 0.324421 | 0.40832 0.878252 0.351053 | 0.324421 0.351053 0.882909 ]
~ cmatrix = [ 7.13338 -2.04653 -0.8652150000000001 | -2.04653 7.3050299999999995 -1.2734999999999999 | -0.8652150000000001 -1.2734999999999999 6.782050000000001 ]
~ normamps=242

New Linecode.MT_ABC:1/0ACSR_ACSR_1/0_NT_NT_4_N nphases=3 units=km
~ rmatrix = [ 0.691075 0.111815 0.110342 | 0.111815 0.694059 0.111815 | 0.110342 0.111815 0.691075 ]
~ xmatrix = [ 0.843012 0.36756 0.284524 | 0.36756 0.836612 0.310294 | 0.284524 0.310294 0.843012 ]
~ cmatrix = [ 7.13338 -2.04653 -0.8652150000000001 | -2.04653 7.3050299999999995 -1.2734999999999999 | -0.8652150000000001 -1.2734999999999999 6.782050000000001 ]
~ normamps=242

New Linecode.MT_ABC:1/0ACSR_ACSR_1/0_NT_NT_4_Y nphases=3 units=km
~ rmatrix = [ 0.691075 0.111815 0.110342 | 0.111815 0.694059 0.111815 | 0.110342 0.111815 0.691075 ]
~ xmatrix = [ 0.843012 0.36756 0.284524 | 0.36756 0.836612 0.310294 | 0.284524 0.310294 0.843012 ]
~ cmatrix = [ 7.13338 -2.04653 -0.8652150000000001 | -2.04653 7.3050299999999995 -1.2734999999999999 | -0.8652150000000001 -1.2734999999999999 6.782050000000001 ]
~ normamps=242

New Linecode.MT_ABC:1/0ACSR_ACSR_2_NT_NT_1_N nphases=3 units=km
~ rmatrix = [ 0.711213 0.132254 0.13048 | 0.132254 0.714803 0.13048 | 0.13048 0.13048 0.711213 ]
~ xmatrix = [ 0.882909 0.40832 0.324421 | 0.40832 0.878252 0.40832 | 0.324421 0.40832 0.882909 ]
~ cmatrix = [ 7.13248 -2.0475100000000004 -0.8662179999999999 | -2.0475100000000004 7.30397 -1.27458 | -0.8662179999999999 -1.27458 6.78093 ]
~ normamps=242

New Linecode.MT_ABC:1/0ACSR_ACSR_2_NT_NT_1_Y nphases=3 units=km
~ rmatrix = [ 0.711213 0.132254 0.13048 | 0.132254 0.714803 0.13048 | 0.13048 0.13048 0.711213 ]
~ xmatrix = [ 0.882909 0.40832 0.324421 | 0.40832 0.878252 0.40832 | 0.324421 0.40832 0.882909 ]
~ cmatrix = [ 7.13248 -2.0475100000000004 -0.8662179999999999 | -2.0475100000000004 7.30397 -1.27458 | -0.8662179999999999 -1.27458 6.78093 ]
~ normamps=242

New Linecode.MT_ABC:1/0ACSR_ACSR_2_NT_NT_4_N nphases=3 units=km
~ rmatrix = [ 0.711213 0.132254 0.13048 | 0.132254 0.714803 0.13048 | 0.13048 0.13048 0.711213 ]
~ xmatrix = [ 0.882909 0.40832 0.324421 | 0.40832 0.878252 0.40832 | 0.324421 0.40832 0.882909 ]
~ cmatrix = [ 7.13248 -2.0475100000000004 -0.8662179999999999 | -2.0475100000000004 7.30397 -1.27458 | -0.8662179999999999 -1.27458 6.78093 ]
~ normamps=242

New Linecode.MT_ABC:1/0ACSR_ACSR_2_NT_NT_4_Y nphases=3 units=km
~ rmatrix = [ 0.711213 0.132254 0.13048 | 0.132254 0.714803 0.13048 | 0.13048 0.13048 0.711213 ]
~ xmatrix = [ 0.882909 0.40832 0.324421 | 0.40832 0.878252 0.40832 | 0.324421 0.40832 0.882909 ]
~ cmatrix = [ 7.13248 -2.0475100000000004 -0.8662179999999999 | -2.0475100000000004 7.30397 -1.27458 | -0.8662179999999999 -1.27458 6.78093 ]
~ normamps=242

New Linecode.MT_ABC:1/0ACSR_NT_NT_AAAC_1/0_2_N nphases=3 units=km
~ rmatrix = [ 0.704286 0.125816 0.123553 | 0.125816 0.708886 0.125816 | 0.123553 0.125816 0.704286 ]
~ xmatrix = [ 0.831267 0.354652 0.272779 | 0.354652 0.822496 0.297386 | 0.272779 0.297386 0.831267 ]
~ cmatrix = [ 7.19193 -1.9794600000000002 -7.99568 | -1.9794600000000002 7.38173 -1.19831 | -7.99568 -1.19831 6.85565 ]
~ normamps=242

New Linecode.MT_ABC:1/0ACSR_NT_NT_AAAC_195.7_2_N nphases=3 units=km
~ rmatrix = [ 0.664644 0.0852762 0.0839106 | 0.0852762 0.667429 0.0852762 | 0.0839106 0.0852762 0.664644 ]
~ xmatrix = [ 0.79172 0.313943 0.233232 | 0.313943 0.780592 0.256676 | 0.233232 0.256676 0.79172 ]
~ cmatrix = [ 7.19761 -1.9731800000000002 -0.79323 | -1.9731800000000002 7.38866 -1.1913 | -0.79323 -1.1913 6.86273 ]
~ normamps=242

New Linecode.MT_ABC:1/0ACSR_NT_NT_AAAC_195.7_2_Y nphases=3 units=km
~ rmatrix = [ 0.664644 0.0852762 0.0839106 | 0.0852762 0.667429 0.0852762 | 0.0839106 0.0852762 0.664644 ]
~ xmatrix = [ 0.79172 0.313943 0.233232 | 0.313943 0.780592 0.256676 | 0.233232 0.256676 0.79172 ]
~ cmatrix = [ 7.19761 -1.9731800000000002 -0.79323 | -1.9731800000000002 7.38866 -1.1913 | -0.79323 -1.1913 6.86273 ]
~ normamps=242

New Linecode.MT_ABC:1/0ACSR_NT_NT_ACSR_1/0_2_N nphases=3 units=km
~ rmatrix = [ 0.0176121 0.0172254 0.0176121 | 0.0172254 0.0168472 0.0172254 | 0.0176121 0.0172254 0.0176121 ]
~ xmatrix = [ 0.800172 0.322391 0.241684 | 0.322391 0.78903 0.265125 | 0.241684 0.265125 0.800172 ]
~ cmatrix = [ 7.0 -2.2 -1.0 | -2.2 7.2 -1.4 | -1.0 -1.4 6.6 ]
~ normamps=242

New Linecode.MT_ABC:1/0ACSR_NT_NT_ACSR_2_2_N nphases=3 units=km
~ rmatrix = [ 0.711213 0.132254 0.13048 | 0.132254 0.714803 0.132254 | 0.13048 0.132254 0.711213 ]
~ xmatrix = [ 0.882909 0.40832 0.324421 | 0.40832 0.878252 0.351053 | 0.324421 0.351053 0.882909 ]
~ cmatrix = [ 8.829089999999999 882.9090000000001 -0.1 | 882.9090000000001 6.8999999999999995 -0.1 | -0.1 -0.1 8.1 ]
~ normamps=242

New Linecode.MT_ABC:1/0ACSR_NT_NT_NT_NT_4_N nphases=3 units=km
~ rmatrix = [ 0.015905 0.0156016 0.015905 | 0.0156016 0.0153039 0.0156016 | 0.015905 0.0156016 0.015905 ]
~ xmatrix = [ 0.717276 0.315296 0.233545 | 0.315296 0.708274 0.25803 | 0.233545 0.25803 0.717276 ]
~ cmatrix = [ 8.32111 -2.65349 -1.04009 | -2.65349 8.57455 -1.59999 | -1.04009 -1.59999 7.798509999999999 ]
~ normamps=242

New Linecode.MT_ABC:1/0ACSR_NT_NT_NT_NT_4_Y nphases=3 units=km
~ rmatrix = [ 0.015905 0.0156016 0.015905 | 0.0156016 0.0153039 0.0156016 | 0.015905 0.0156016 0.015905 ]
~ xmatrix = [ 0.717276 0.315296 0.233545 | 0.315296 0.708274 0.25803 | 0.233545 0.25803 0.717276 ]
~ cmatrix = [ 8.32111 -2.65349 -1.04009 | -2.65349 8.57455 -1.59999 | -1.04009 -1.59999 7.798509999999999 ]
~ normamps=242

New Linecode.MT_ABC:1/0ACSR_NT_NT_NT_NT_NE_N nphases=3 units=km
~ rmatrix = [ 0.015905 0.0156016 0.015905 | 0.0156016 0.0153039 0.0156016 | 0.015905 0.0156016 0.015905 ]
~ xmatrix = [ 0.717276 0.315296 0.233545 | 0.315296 0.708274 0.25803 | 0.233545 0.25803 0.717276 ]
~ cmatrix = [ 8.32111 -2.65349 -1.04009 | -2.65349 8.57455 -1.59999 | -1.04009 -1.59999 7.798509999999999 ]
~ normamps=242

New Linecode.MT_ABC:123.3AAAC_AAAC_1/0_NT_NT_4_N nphases=3 units=km
~ rmatrix = [ 0.682805 0.121994 0.120305 | 0.121994 0.686226 0.121994 | 0.120305 0.121994 0.682805 ]
~ xmatrix = [ 0.762625 0.36197 0.279018 | 0.36197 0.756054 0.304703 | 0.279018 0.304703 0.762625 ]
~ cmatrix = [ 8.32339 -2.65476 -1.04046 | -2.65476 8.577 -1.6006799999999999 | -1.04046 -1.6006799999999999 7.800409999999999 ]
~ normamps=256

New Linecode.MT_ABC:123.3AAAC_AAAC_1/0_NT_NT_4_Y nphases=3 units=km
~ rmatrix = [ 0.682805 0.121994 0.120305 | 0.121994 0.686226 0.121994 | 0.120305 0.121994 0.682805 ]
~ xmatrix = [ 0.762625 0.36197 0.279018 | 0.36197 0.756054 0.304703 | 0.279018 0.304703 0.762625 ]
~ cmatrix = [ 8.32339 -2.65476 -1.04046 | -2.65476 8.577 -1.6006799999999999 | -1.04046 -1.6006799999999999 7.800409999999999 ]
~ normamps=256

New Linecode.MT_ABC:123.3AAAC_AAAC_123.3_NT_NT_1_N nphases=3 units=km
~ rmatrix = [ 0.679997 0.11914 0.117497 | 0.11914 0.683325 0.11914 | 0.117497 0.11914 0.679997 ]
~ xmatrix = [ 0.758781 0.35804 0.275174 | 0.35804 0.752037 0.300773 | 0.275174 0.300773 0.758781 ]
~ cmatrix = [ 8.32342 -2.65472 -1.0404200000000001 | -2.65472 8.577039999999998 -1.60064 | -1.0404200000000001 -1.60064 7.80045 ]
~ normamps=256

New Linecode.MT_ABC:123.3AAAC_AAAC_123.3_NT_NT_1_Y nphases=3 units=km
~ rmatrix = [ 0.679997 0.11914 0.117497 | 0.11914 0.683325 0.11914 | 0.117497 0.11914 0.679997 ]
~ xmatrix = [ 0.758781 0.35804 0.275174 | 0.35804 0.752037 0.300773 | 0.275174 0.300773 0.758781 ]
~ cmatrix = [ 8.32342 -2.65472 -1.0404200000000001 | -2.65472 8.577039999999998 -1.60064 | -1.0404200000000001 -1.60064 7.80045 ]
~ normamps=256

New Linecode.MT_ABC:123.3AAAC_AAAC_123.3_NT_NT_2_N nphases=3 units=km
~ rmatrix = [ 0.679997 0.11914 0.117497 | 0.11914 0.683325 0.11914 | 0.117497 0.11914 0.679997 ]
~ xmatrix = [ 0.758781 0.35804 0.275174 | 0.35804 0.752037 0.300773 | 0.275174 0.300773 0.758781 ]
~ cmatrix = [ 8.32342 -2.65472 -1.0404200000000001 | -2.65472 8.577039999999998 -1.60064 | -1.0404200000000001 -1.60064 7.80045 ]
~ normamps=256

New Linecode.MT_ABC:123.3AAAC_AAAC_123.3_NT_NT_4_N nphases=3 units=km
~ rmatrix = [ 0.679997 0.11914 0.117497 | 0.11914 0.683325 0.11914 | 0.117497 0.11914 0.679997 ]
~ xmatrix = [ 0.758781 0.35804 0.275174 | 0.35804 0.752037 0.300773 | 0.275174 0.300773 0.758781 ]
~ cmatrix = [ 8.32342 -2.65472 -1.0404200000000001 | -2.65472 8.577039999999998 -1.60064 | -1.0404200000000001 -1.60064 7.80045 ]
~ normamps=256

New Linecode.MT_ABC:123.3AAAC_AAAC_123.3_NT_NT_4_Y nphases=3 units=km
~ rmatrix = [ 0.679997 0.11914 0.117497 | 0.11914 0.683325 0.11914 | 0.117497 0.11914 0.679997 ]
~ xmatrix = [ 0.758781 0.35804 0.275174 | 0.35804 0.752037 0.300773 | 0.275174 0.300773 0.758781 ]
~ cmatrix = [ 8.32342 -2.65472 -1.0404200000000001 | -2.65472 8.577039999999998 -1.60064 | -1.0404200000000001 -1.60064 7.80045 ]
~ normamps=256

New Linecode.MT_ABC:123.3AAAC_AAAC_77.4_NT_NT_4_N nphases=3 units=km
~ rmatrix = [ 0.697856 0.137248 0.135356 | 0.137248 0.701685 0.137248 | 0.135356 0.137248 0.697856 ]
~ xmatrix = [ 0.800689 0.400845 0.317082 | 0.400845 0.795758 0.343578 | 0.317082 0.343578 0.800689 ]
~ cmatrix = [ 8.3187 -2.65986 -1.0457699999999999 | -2.65986 8.571449999999999 -1.60647 | -1.0457699999999999 -1.60647 7.79439 ]
~ normamps=256

New Linecode.MT_ABC:123.3AAAC_AAAC_77.4_NT_NT_4_Y nphases=3 units=km
~ rmatrix = [ 0.697856 0.137248 0.135356 | 0.137248 0.701685 0.137248 | 0.135356 0.137248 0.697856 ]
~ xmatrix = [ 0.800689 0.400845 0.317082 | 0.400845 0.795758 0.343578 | 0.317082 0.343578 0.800689 ]
~ cmatrix = [ 8.3187 -2.65986 -1.0457699999999999 | -2.65986 8.571449999999999 -1.60647 | -1.0457699999999999 -1.60647 7.79439 ]
~ normamps=256

New Linecode.MT_ABC:123.3AAAC_NT_NT_AAAC_123.3_2_N nphases=3 units=km
~ rmatrix = [ 0.683157 0.122858 0.122858 | 0.122858 0.687631 0.122858 | 0.122858 0.122858 0.683157 ]
~ xmatrix = [ 0.752378 0.35053 0.268771 | 0.35053 0.752378 0.293264 | 0.268771 0.293264 0.752378 ]
~ cmatrix = [ 8.37276 -2.59639 -0.9839110000000001 | -2.59639 8.645669999999999 -1.5338699999999998 | -0.9839110000000001 -1.5338699999999998 7.865169999999999 ]
~ normamps=256

New Linecode.MT_ABC:123.3AAAC_NT_NT_AAAC_123.3_2_Y nphases=3 units=km
~ rmatrix = [ 0.683157 0.122858 0.122858 | 0.122858 0.687631 0.122858 | 0.122858 0.122858 0.683157 ]
~ xmatrix = [ 0.752378 0.35053 0.268771 | 0.35053 0.752378 0.293264 | 0.268771 0.293264 0.752378 ]
~ cmatrix = [ 8.37276 -2.59639 -0.9839110000000001 | -2.59639 8.645669999999999 -1.5338699999999998 | -0.9839110000000001 -1.5338699999999998 7.865169999999999 ]
~ normamps=256

New Linecode.MT_ABC:123.3AAAC_NT_NT_AAAC_123.3_NE_N nphases=3 units=km
~ rmatrix = [ 0.683157 0.122858 0.122858 | 0.122858 0.687631 0.122858 | 0.122858 0.122858 0.683157 ]
~ xmatrix = [ 0.752378 0.35053 0.268771 | 0.35053 0.752378 0.293264 | 0.268771 0.293264 0.752378 ]
~ cmatrix = [ 8.37276 -2.59639 -0.9839110000000001 | -2.59639 8.645669999999999 -1.5338699999999998 | -0.9839110000000001 -1.5338699999999998 7.865169999999999 ]
~ normamps=256

New Linecode.MT_ABC:123.3AAAC_NT_NT_AAAC_123.3_NE_Y nphases=3 units=km
~ rmatrix = [ 0.683157 0.122858 0.122858 | 0.122858 0.687631 0.122858 | 0.122858 0.122858 0.683157 ]
~ xmatrix = [ 0.752378 0.35053 0.268771 | 0.35053 0.752378 0.293264 | 0.268771 0.293264 0.752378 ]
~ cmatrix = [ 8.37276 -2.59639 -0.9839110000000001 | -2.59639 8.645669999999999 -1.5338699999999998 | -0.9839110000000001 -1.5338699999999998 7.865169999999999 ]
~ normamps=256

New Linecode.MT_ABC:123.3AAAC_NT_NT_NT_NT_1_Y nphases=3 units=km
~ rmatrix = [ 0.679997 0.11914 0.117497 | 0.11914 0.683325 0.11914 | 0.117497 0.11914 0.679997 ]
~ xmatrix = [ 0.758781 0.35804 0.275174 | 0.35804 0.752037 0.300773 | 0.275174 0.300773 0.758781 ]
~ cmatrix = [ 8.32342 -2.65472 -1.0404200000000001 | -2.65472 8.577039999999998 -1.60064 | -1.0404200000000001 -1.60064 7.80045 ]
~ normamps=256

New Linecode.MT_ABC:123.3AAAC_NT_NT_NT_NT_4_Y nphases=3 units=km
~ rmatrix = [ 0.697856 0.137248 0.135356 | 0.137248 0.701685 0.137248 | 0.135356 0.137248 0.697856 ]
~ xmatrix = [ 0.800689 0.400845 0.317082 | 0.400845 0.795758 0.343578 | 0.317082 0.343578 0.800689 ]
~ cmatrix = [ 8.3187 -2.65986 -1.0457699999999999 | -2.65986 8.571449999999999 -1.60647 | -1.0457699999999999 -1.60647 7.79439 ]
~ normamps=256

New Linecode.MT_ABC:195.7AAAC_AAAC_123.3_NT_NT_4_N nphases=3 units=km
~ rmatrix = [ 0.415497 0.11914 0.117497 | 0.11914 0.418825 0.11914 | 0.117497 0.11914 0.415497 ]
~ xmatrix = [ 0.758904 0.35804 0.275174 | 0.35804 0.752161 0.317082 | 0.275174 0.317082 0.795758 ]
~ cmatrix = [ 8.32115 -2.65345 -1.0400500000000001 | -2.65345 8.57459 -1.59995 | -1.0400500000000001 -1.59995 7.79856 ]
~ normamps=342

New Linecode.MT_ABC:195.7AAAC_AAAC_123.3_NT_NT_4_Y nphases=3 units=km
~ rmatrix = [ 0.415497 0.11914 0.117497 | 0.11914 0.418825 0.11914 | 0.117497 0.11914 0.415497 ]
~ xmatrix = [ 0.758904 0.35804 0.275174 | 0.35804 0.752161 0.317082 | 0.275174 0.317082 0.795758 ]
~ cmatrix = [ 8.32115 -2.65345 -1.0400500000000001 | -2.65345 8.57459 -1.59995 | -1.0400500000000001 -1.59995 7.79856 ]
~ normamps=342

New Linecode.MT_ABC:195.7AAAC_ACSR_1/0_NT_NT_1_N nphases=3 units=km
~ rmatrix = [ 0.408342 0.111815 0.110342 | 0.111815 0.411326 0.111815 | 0.110342 0.111815 0.408342 ]
~ xmatrix = [ 0.768254 0.36756 0.284524 | 0.36756 0.761854 0.310294 | 0.284524 0.310294 0.768254 ]
~ cmatrix = [ 8.302850000000001 -2.67336 -1.0608 | -2.67336 8.55293 -1.62252 | -1.0608 -1.62252 7.775040000000001 ]
~ normamps=342

New Linecode.MT_ABC:195.7AAAC_ACSR_1/0_NT_NT_1_Y nphases=3 units=km
~ rmatrix = [ 0.408342 0.111815 0.110342 | 0.111815 0.411326 0.111815 | 0.110342 0.111815 0.408342 ]
~ xmatrix = [ 0.768254 0.36756 0.284524 | 0.36756 0.761854 0.310294 | 0.284524 0.310294 0.768254 ]
~ cmatrix = [ 8.302850000000001 -2.67336 -1.0608 | -2.67336 8.55293 -1.62252 | -1.0608 -1.62252 7.775040000000001 ]
~ normamps=342

New Linecode.MT_ABC:195.7AAAC_ACSR_1/0_NT_NT_4_N nphases=3 units=km
~ rmatrix = [ 0.408342 0.111815 0.110342 | 0.111815 0.411326 0.111815 | 0.110342 0.111815 0.408342 ]
~ xmatrix = [ 0.768254 0.36756 0.284524 | 0.36756 0.761854 0.310294 | 0.284524 0.310294 0.768254 ]
~ cmatrix = [ 8.302850000000001 -2.67336 -1.0608 | -2.67336 8.55293 -1.62252 | -1.0608 -1.62252 7.775040000000001 ]
~ normamps=342

New Linecode.MT_ABC:195.7AAAC_ACSR_1/0_NT_NT_4_Y nphases=3 units=km
~ rmatrix = [ 0.408342 0.111815 0.110342 | 0.111815 0.411326 0.111815 | 0.110342 0.111815 0.408342 ]
~ xmatrix = [ 0.768254 0.36756 0.284524 | 0.36756 0.761854 0.310294 | 0.284524 0.310294 0.768254 ]
~ cmatrix = [ 8.302850000000001 -2.67336 -1.0608 | -2.67336 8.55293 -1.62252 | -1.0608 -1.62252 7.775040000000001 ]
~ normamps=342

New Linecode.MT_ABC:195.7AAAC_ACSR_2_NT_NT_1_N nphases=3 units=km
~ rmatrix = [ 0.42848 0.132564 0.13048 | 0.132564 0.432707 0.132564 | 0.13048 0.132564 0.42848 ]
~ xmatrix = [ 0.808152 0.373971 0.324421 | 0.373971 0.80267 0.373971 | 0.324421 0.373971 0.808152 ]
~ cmatrix = [ 7.9632499999999995 -2.04599 -1.07194 | -2.04599 8.40789 -2.04599 | -1.07194 -2.04599 7.9632499999999995 ]
~ normamps=342

New Linecode.MT_ABC:195.7AAAC_ACSR_2_NT_NT_1_Y nphases=3 units=km
~ rmatrix = [ 0.42848 0.132564 0.13048 | 0.132564 0.432707 0.132564 | 0.13048 0.132564 0.42848 ]
~ xmatrix = [ 0.808152 0.373971 0.324421 | 0.373971 0.80267 0.373971 | 0.324421 0.373971 0.808152 ]
~ cmatrix = [ 7.9632499999999995 -2.04599 -1.07194 | -2.04599 8.40789 -2.04599 | -1.07194 -2.04599 7.9632499999999995 ]
~ normamps=342

New Linecode.MT_ABC:2ACSR_ACSR_2_NT_NT_1_N nphases=3 units=km
~ rmatrix = [ 108528.0 0.132254 0.13048 | 0.132254 108887.0 0.13048 | 0.13048 0.13048 108528.0 ]
~ xmatrix = [ 0.887802 0.40832 0.324421 | 0.40832 0.883144 0.351053 | 0.324421 0.351053 0.887802 ]
~ cmatrix = [ 7.068009999999999 -2.01474 -0.855307 | -2.01474 7.23565 -1.25593 | -0.855307 -1.25593 6.72501 ]
~ normamps=184

New Linecode.MT_ABC:2ACSR_ACSR_2_NT_NT_4_N nphases=3 units=km
~ rmatrix = [ 108528.0 0.132254 0.13048 | 0.132254 108887.0 0.132254 | 0.13048 0.132254 108528.0 ]
~ xmatrix = [ 0.887802 0.40832 0.324421 | 0.40832 0.883144 0.351053 | 0.324421 0.351053 0.887802 ]
~ cmatrix = [ 7.0 -2.1 -1.0 | -2.1 7.1000000000000005 -1.4 | -1.0 -1.4 6.6 ]
~ normamps=184

New Linecode.MT_ABC:2ACSR_NT_NT_AAAC_1/0_2_N nphases=3 units=km
~ rmatrix = [ 0.970114 0.0149203 0.0153136 | 0.0149203 0.969337 0.0149203 | 0.0153136 0.0149203 0.970114 ]
~ xmatrix = [ 0.788071 0.304894 0.22469 | 0.304894 0.775906 0.247627 | 0.22469 0.247627 0.788071 ]
~ cmatrix = [ 7.127470000000001 -1.9464700000000001 -0.788689 | -1.9464700000000001 7.31387 -1.17946 | -0.788689 -1.17946 6.79965 ]
~ normamps=184

New Linecode.MT_ABC:246.9AAAC_AAAC_1/0_NT_NT_1_N nphases=3 units=km
~ rmatrix = [ 0.356605 0.12229 0.120305 | 0.12229 0.360634 0.12229 | 0.120305 0.12229 0.356605 ]
~ xmatrix = [ 0.736496 0.327455 0.279018 | 0.327455 0.728762 0.327455 | 0.279018 0.327455 0.736496 ]
~ cmatrix = [ 8.442929999999999 -2.2332799999999997 -1.13381 | -2.2332799999999997 8.96166 -2.2332799999999997 | -1.13381 -2.2332799999999997 8.442929999999999 ]
~ normamps=342

New Linecode.MT_ABC:246.9AAAC_AAAC_1/0_NT_NT_1_Y nphases=3 units=km
~ rmatrix = [ 0.356605 0.12229 0.120305 | 0.12229 0.360634 0.12229 | 0.120305 0.12229 0.356605 ]
~ xmatrix = [ 0.736496 0.327455 0.279018 | 0.327455 0.728762 0.327455 | 0.279018 0.327455 0.736496 ]
~ cmatrix = [ 8.442929999999999 -2.2332799999999997 -1.13381 | -2.2332799999999997 8.96166 -2.2332799999999997 | -1.13381 -2.2332799999999997 8.442929999999999 ]
~ normamps=342

New Linecode.MT_ABC:246.9AAAC_AAAC_123.3_NT_NT_1_N nphases=3 units=km
~ rmatrix = [ 0.353797 0.119428 0.117497 | 0.119428 0.357717 0.119428 | 0.117497 0.119428 0.353797 ]
~ xmatrix = [ 0.732652 0.323511 0.275174 | 0.323511 0.724715 0.323511 | 0.275174 0.323511 0.732652 ]
~ cmatrix = [ 8.442969999999999 -2.2332300000000003 -1.1337700000000002 | -2.2332300000000003 8.961699999999999 -2.2332300000000003 | -1.1337700000000002 -2.2332300000000003 8.442969999999999 ]
~ normamps=342

New Linecode.MT_ABC:246.9AAAC_AAAC_123.3_NT_NT_1_Y nphases=3 units=km
~ rmatrix = [ 0.353797 0.119428 0.117497 | 0.119428 0.357717 0.119428 | 0.117497 0.119428 0.353797 ]
~ xmatrix = [ 0.732652 0.323511 0.275174 | 0.323511 0.724715 0.323511 | 0.275174 0.323511 0.732652 ]
~ cmatrix = [ 8.442969999999999 -2.2332300000000003 -1.1337700000000002 | -2.2332300000000003 8.961699999999999 -2.2332300000000003 | -1.1337700000000002 -2.2332300000000003 8.442969999999999 ]
~ normamps=342

New Linecode.MT_ABC:246.9AAAC_ACSR_1/0_NT_NT_1_N nphases=3 units=km
~ rmatrix = [ 0.346642 0.112073 0.110342 | 0.112073 0.350156 0.112073 | 0.110342 0.112073 0.346642 ]
~ xmatrix = [ 0.742002 0.333061 0.284524 | 0.333061 0.734469 0.333061 | 0.284524 0.333061 0.742002 ]
~ cmatrix = [ 8.420810000000001 -2.25647 -1.15593 | -2.25647 8.937330000000001 -2.25647 | -1.15593 -2.25647 8.420810000000001 ]
~ normamps=342

New Linecode.MT_ABC:246.9AAAC_ACSR_1/0_NT_NT_1_Y nphases=3 units=km
~ rmatrix = [ 0.346642 0.112073 0.110342 | 0.112073 0.350156 0.112073 | 0.110342 0.112073 0.346642 ]
~ xmatrix = [ 0.742002 0.333061 0.284524 | 0.333061 0.734469 0.333061 | 0.284524 0.333061 0.742002 ]
~ cmatrix = [ 8.420810000000001 -2.25647 -1.15593 | -2.25647 8.937330000000001 -2.25647 | -1.15593 -2.25647 8.420810000000001 ]
~ normamps=342

New Linecode.MT_ABC:3/0ACSR_AAAC_246.9_NT_NT_4_N nphases=3 units=km
~ rmatrix = [ 0.438778 0.0712759 0.0704748 | 0.0712759 0.440408 0.0712759 | 0.0704748 0.0712759 0.438778 ]
~ xmatrix = [ 0.769965 0.315744 0.233841 | 0.315744 0.761274 0.258477 | 0.233841 0.258477 0.769965 ]
~ cmatrix = [ 7.46825 -2.1821200000000003 -0.8915569999999999 | -2.1821200000000003 7.66336 -1.33606 | -0.8915569999999999 -1.33606 7.079829999999999 ]
~ normamps=315

New Linecode.MT_ABC:3/0ACSR_AAAC_246.9_NT_NT_4_Y nphases=3 units=km
~ rmatrix = [ 0.438778 0.0712759 0.0704748 | 0.0712759 0.440408 0.0712759 | 0.0704748 0.0712759 0.438778 ]
~ xmatrix = [ 0.769965 0.315744 0.233841 | 0.315744 0.761274 0.258477 | 0.233841 0.258477 0.769965 ]
~ cmatrix = [ 7.46825 -2.1821200000000003 -0.8915569999999999 | -2.1821200000000003 7.66336 -1.33606 | -0.8915569999999999 -1.33606 7.079829999999999 ]
~ normamps=315

New Linecode.MT_ABC:3/0ACSR_ACSR_1/0_NT_NT_1_N nphases=3 units=km
~ rmatrix = [ 0.478645 0.112073 0.110342 | 0.112073 0.4821 0.112073 | 0.110342 0.112073 0.478645 ]
~ xmatrix = [ 0.820648 0.333061 0.284524 | 0.333061 0.813115 0.333061 | 0.284524 0.333061 0.820648 ]
~ cmatrix = [ 7.19291 -1.70553 -0.925988 | -1.70553 7.53102 -1.70553 | -0.925988 -1.70553 7.19291 ]
~ normamps=315

New Linecode.MT_ABC:3/0ACSR_ACSR_1/0_NT_NT_1_Y nphases=3 units=km
~ rmatrix = [ 0.478645 0.112073 0.110342 | 0.112073 0.4821 0.112073 | 0.110342 0.112073 0.478645 ]
~ xmatrix = [ 0.820648 0.333061 0.284524 | 0.333061 0.813115 0.333061 | 0.284524 0.333061 0.820648 ]
~ cmatrix = [ 7.19291 -1.70553 -0.925988 | -1.70553 7.53102 -1.70553 | -0.925988 -1.70553 7.19291 ]
~ normamps=315

New Linecode.MT_ABC:3/0ACSR_ACSR_1/0_NT_NT_3_N nphases=3 units=km
~ rmatrix = [ 0.471561 0.10038 0.103258 | 0.10038 0.465973 0.10038 | 0.103258 0.10038 0.471561 ]
~ xmatrix = [ 0.836031 0.3588 0.316395 | 0.3588 0.848386 0.329488 | 0.316395 0.329488 0.836031 ]
~ cmatrix = [ 7.236109999999999 -1.83384 -1.2519600000000002 | -1.83384 7.16581 -1.41594 | -1.2519600000000002 -1.41594 7.04659 ]
~ normamps=315

New Linecode.MT_ABC:3/0ACSR_ACSR_1/0_NT_NT_4_N nphases=3 units=km
~ rmatrix = [ 0.427521 0.111815 0.110342 | 0.111815 0.481629 0.111815 | 0.110342 0.111815 0.478645 ]
~ xmatrix = [ 0.820648 0.36756 0.284524 | 0.36756 0.814248 0.310294 | 0.284524 0.310294 0.820648 ]
~ cmatrix = [ 7.444850000000001 -2.20751 -0.917756 | -2.20751 7.63579 -1.3645 | -0.917756 -1.3645 7.050490000000001 ]
~ normamps=315

New Linecode.MT_ABC:3/0ACSR_ACSR_1/0_NT_NT_4_Y nphases=3 units=km
~ rmatrix = [ 0.427521 0.111815 0.110342 | 0.111815 0.481629 0.111815 | 0.110342 0.111815 0.478645 ]
~ xmatrix = [ 0.820648 0.36756 0.284524 | 0.36756 0.814248 0.310294 | 0.284524 0.310294 0.820648 ]
~ cmatrix = [ 7.444850000000001 -2.20751 -0.917756 | -2.20751 7.63579 -1.3645 | -0.917756 -1.3645 7.050490000000001 ]
~ normamps=315

New Linecode.MT_ABC:3/0ACSR_ACSR_2_NT_NT_1_N nphases=3 units=km
~ rmatrix = [ 0.498783 0.132564 0.13048 | 0.132564 0.50301 0.132564 | 0.13048 0.132564 0.498783 ]
~ xmatrix = [ 0.860546 0.373971 0.324421 | 0.373971 0.855064 0.373971 | 0.324421 0.373971 0.860546 ]
~ cmatrix = [ 7.19185 -1.70664 -0.927044 | -1.70664 7.6346799999999995 -1.36564 | -0.927044 -1.36564 7.049320000000001 ]
~ normamps=315

New Linecode.MT_ABC:3/0ACSR_ACSR_2_NT_NT_2_N nphases=3 units=km
~ rmatrix = [ 0.498783 0.132564 0.13048 | 0.132564 0.50301 0.132564 | 0.13048 0.132564 0.498783 ]
~ xmatrix = [ 0.860546 0.373971 0.324421 | 0.373971 0.855064 0.373971 | 0.324421 0.373971 0.860546 ]
~ cmatrix = [ 7.19185 -1.70664 -0.927044 | -1.70664 7.6346799999999995 -1.36564 | -0.927044 -1.36564 7.049320000000001 ]
~ normamps=315

New Linecode.MT_ABC:3/0ACSR_ACSR_3/0_NT_NT_1_Y nphases=3 units=km
~ rmatrix = [ 0.455363 0.0881277 0.0870598 | 0.0881277 0.45753 0.0881277 | 0.0870598 0.0881277 0.455363 ]
~ xmatrix = [ 0.795783 0.342129 0.259658 | 0.342129 0.788238 0.284862 | 0.259658 0.284862 0.795783 ]
~ cmatrix = [ 7.449339999999999 -2.20264 -0.912729 | -2.20264 7.64108 -1.35904 | -0.912729 -1.35904 7.05612 ]
~ normamps=315

New Linecode.MT_ABC:3/0ACSR_NT_NT_ACSR_1/0_2_N nphases=3 units=km
~ rmatrix = [ 0.481478 0.115148 0.113175 | 0.115148 0.48549 0.115148 | 0.113175 0.115148 0.481478 ]
~ xmatrix = [ 0.814571 0.360465 0.278447 | 0.360465 0.806029 0.303152 | 0.278447 0.303152 0.814571 ]
~ cmatrix = [ 7.48459 -2.1617699999999997 -0.873168 | -2.1617699999999997 7.689889999999999 -1.31209 | -0.873168 -1.31209 7.100750000000001 ]
~ normamps=315

New Linecode.MT_ABC:3/0ACSR_NT_NT_ACSR_1/0_2_Y nphases=3 units=km
~ rmatrix = [ 0.481478 0.115148 0.113175 | 0.115148 0.48549 0.115148 | 0.113175 0.115148 0.481478 ]
~ xmatrix = [ 0.814571 0.360465 0.278447 | 0.360465 0.806029 0.303152 | 0.278447 0.303152 0.814571 ]
~ cmatrix = [ 7.48459 -2.1617699999999997 -0.873168 | -2.1617699999999997 7.689889999999999 -1.31209 | -0.873168 -1.31209 7.100750000000001 ]
~ normamps=315

New Linecode.MT_ABC:3/0ACSR_NT_NT_ACSR_1/0_9_N nphases=3 units=km
~ rmatrix = [ 0.385915 0.0172254 0.0176121 | 0.0172254 0.38515 0.0172254 | 0.0176121 0.0172254 0.385915 ]
~ xmatrix = [ 0.777808 0.322391 0.241684 | 0.322391 0.766666 0.265125 | 0.241684 0.265125 0.777808 ]
~ cmatrix = [ 7.48433 -2.1612799999999996 -0.873181 | -2.1612799999999996 7.6897199999999994 -1.3123099999999999 | -0.873181 -1.3123099999999999 7.10083 ]
~ normamps=315

New Linecode.MT_ABC:3/0ACSR_NT_NT_ACSR_1/0_9_Y nphases=3 units=km
~ rmatrix = [ 0.385915 0.0172254 0.0176121 | 0.0172254 0.38515 0.0172254 | 0.0176121 0.0172254 0.385915 ]
~ xmatrix = [ 0.777808 0.322391 0.241684 | 0.322391 0.766666 0.265125 | 0.241684 0.265125 0.777808 ]
~ cmatrix = [ 7.48433 -2.1612799999999996 -0.873181 | -2.1612799999999996 7.6897199999999994 -1.3123099999999999 | -0.873181 -1.3123099999999999 7.10083 ]
~ normamps=315

New Linecode.MT_ABC:3/0ACSR_NT_NT_ACSR_2_2_N nphases=3 units=km
~ rmatrix = [ 0.502191 0.13626 0.133888 | 0.13626 0.507008 0.13626 | 0.133888 0.13626 0.502191 ]
~ xmatrix = [ 0.856123 0.403135 0.319999 | 0.403135 0.84991 0.4767 | 0.319999 0.4767 0.856123 ]
~ cmatrix = [ 7.483090000000001 -2.1626499999999997 -0.8745660000000001 | -2.1626499999999997 7.68821 -1.3138500000000002 | -0.8745660000000001 -1.3138500000000002 7.09928 ]
~ normamps=315

New Linecode.MT_ABC:3/0ACSR_NT_NT_ACSR_3/0_2_N nphases=3 units=km
~ rmatrix = [ 0.45742 0.0905531 0.0891171 | 0.0905531 0.460347 0.0905531 | 0.0891171 0.0905531 0.45742 ]
~ xmatrix = [ 0.78862 0.333725 0.252495 | 0.333725 0.778542 0.276458 | 0.252495 0.276458 0.78862 ]
~ cmatrix = [ 74.90220000000001 -2.15476 -0.866565 | -2.15476 7.69695 -1.30499 | -0.866565 -1.30499 7.10826 ]
~ normamps=315

New Linecode.MT_ABC:336AAAC_AAAC_.7195_NT_NT_1_N nphases=3 units=km
~ rmatrix = [ 0.256726 0.0831472 0.0819556 | 0.0831472 0.259152 0.0831472 | 0.0819556 0.0831472 0.256726 ]
~ xmatrix = [ 0.680054 0.288556 0.241141 | 0.288556 0.670249 0.288556 | 0.241141 0.288556 0.680054 ]
~ cmatrix = [ 8.10953 -2.07043 -1.06587 | -2.07043 8.575 -2.07043 | -1.06587 -2.07043 8.10953 ]
~ normamps=532

New Linecode.MT_ABC:336AAAC_AAAC_.7195_NT_NT_1_Y nphases=3 units=km
~ rmatrix = [ 0.256726 0.0831472 0.0819556 | 0.0831472 0.259152 0.0831472 | 0.0819556 0.0831472 0.256726 ]
~ xmatrix = [ 0.680054 0.288556 0.241141 | 0.288556 0.670249 0.288556 | 0.241141 0.288556 0.680054 ]
~ cmatrix = [ 8.10953 -2.07043 -1.06587 | -2.07043 8.575 -2.07043 | -1.06587 -2.07043 8.10953 ]
~ normamps=532

New Linecode.MT_ABC:336AAAC_AAAC_1/0_AAAC_1/0_2_N nphases=3 units=km
~ rmatrix = [ 0.181049 0.00597246 0.00627856 | 0.00597246 0.180451 0.00597246 | 0.00627856 0.00597246 0.181049 ]
~ xmatrix = [ 0.582703 0.222735 0.14379 | 0.222735 0.568003 0.165469 | 0.14379 0.165469 0.582703 ]
~ cmatrix = [ 8.631649999999999 -2.5301299999999998 -0.859429 | -2.5301299999999998 8.93858 -1.4148699999999999 | -0.859429 -1.4148699999999999 8.139439999999999 ]
~ normamps=532
New Linecode.MT_ABC:336AAAC_AAAC_1/0_AAAC_4/0_2_N nphases=3 units=km
~ rmatrix = [ 0.180787 0.00571522 0.00601729 | 0.00571522 0.180198 0.00571522 | 0.00601729 0.00571522 0.180787 ]
~ xmatrix = [ 0.579621 0.219597 0.140708 | 0.219597 0.564807 0.16233 | 0.140708 0.16233 0.579621 ]
~ cmatrix = [ 8.640149999999998 -2.52099 -0.8497939999999999 | -2.52099 8.94838 -1.4045100000000001 | -0.8497939999999999 -1.4045100000000001 8.150360000000001 ]
~ normamps=532

New Linecode.MT_ABC:336AAAC_AAAC_1/0_NT_NT_4_N nphases=3 units=km
~ rmatrix = [ 0.295075 0.121994 0.120305 | 0.121994 0.121994 0.121994 | 0.120305 0.121994 0.295075 ]
~ xmatrix = [ 0.717931 0.36197 0.279018 | 0.36197 0.71136 0.304703 | 0.279018 0.304703 0.717931 ]
~ cmatrix = [ 8.4542 -2.72812 -1.06158 | -2.72812 8.71766 -1.64042 | -1.06158 -1.64042 7.90914 ]
~ normamps=532

New Linecode.MT_ABC:336AAAC_AAAC_123.3_AAAC_123.3_2_N nphases=3 units=km
~ rmatrix = [ 0.295427 0.122858 0.120657 | 0.122858 0.299901 0.122858 | 0.120657 0.122858 0.295427 ]
~ xmatrix = [ 0.707684 0.35053 0.268771 | 0.35053 0.698682 0.293264 | 0.268771 0.293264 0.707684 ]
~ cmatrix = [ 8.504249999999999 -2.6688699999999996 -1.00414 | -2.6688699999999996 8.787460000000001 -1.57246 | -1.00414 -1.57246 7.975060000000001 ]
~ normamps=532

New Linecode.MT_ABC:336AAAC_AAAC_123.3_AAAC_195.7_2_N nphases=3 units=km
~ rmatrix = [ 0.265039 0.091766 0.0902694 | 0.091766 0.268089 0.091766 | 0.0902694 0.091766 0.265039 ]
~ xmatrix = [ 0.603239 0.243881 0.164326 | 0.243881 0.589778 0.186614 | 0.164326 0.186614 0.603239 ]
~ cmatrix = [ 8.63168 -2.5301 -0.859395 | -2.5301 8.938609999999999 -1.41483 | -0.859395 -1.41483 8.139479999999999 ]
~ normamps=532

New Linecode.MT_ABC:336AAAC_AAAC_123.3_AAAC_246.9_2_Y nphases=3 units=km
~ rmatrix = [ 0.257362 0.0838987 0.0825919 | 0.0838987 0.260028 0.0838987 | 0.0825919 0.0838987 0.257362 ]
~ xmatrix = [ 0.59815 0.238603 0.159236 | 0.238603 0.584305 0.181336 | 0.159236 0.181336 0.59815 ]
~ cmatrix = [ 8.64079 -2.51994 -0.84902 | -2.51994 8.94995 -1.4032499999999999 | -0.84902 -1.4032499999999999 8.1513 ]
~ normamps=532

New Linecode.MT_ABC:336AAAC_AAAC_123.3_NT_NT_2_N nphases=3 units=km
~ rmatrix = [ 0.296703 0.124413 0.121933 | 0.124413 0.301753 0.124413 | 0.121933 0.124413 0.296703 ]
~ xmatrix = [ 0.705109 0.347403 0.266196 | 0.347403 0.694977 0.290137 | 0.266196 0.290137 0.705109 ]
~ cmatrix = [ 8.48307 -2.6854299999999998 -1.02739 | -2.6854299999999998 8.777099999999999 -1.59031 | -1.02739 -1.59031 7.94959 ]
~ normamps=532

New Linecode.MT_ABC:336AAAC_AAAC_123.3_NT_NT_2_Y nphases=3 units=km
~ rmatrix = [ 0.296703 0.124413 0.121933 | 0.124413 0.301753 0.124413 | 0.121933 0.124413 0.296703 ]
~ xmatrix = [ 0.705109 0.347403 0.266196 | 0.347403 0.694977 0.290137 | 0.266196 0.290137 0.705109 ]
~ cmatrix = [ 8.48307 -2.6854299999999998 -1.02739 | -2.6854299999999998 8.777099999999999 -1.59031 | -1.02739 -1.59031 7.94959 ]
~ normamps=532

New Linecode.MT_ABC:336AAAC_AAAC_123.3_NT_NT_4_N nphases=3 units=km
~ rmatrix = [ 0.295427 0.122858 0.120657 | 0.122858 0.299901 0.122858 | 0.120657 0.122858 0.295427 ]
~ xmatrix = [ 0.707684 0.35053 0.268771 | 0.35053 0.698682 0.293264 | 0.268771 0.293264 0.707684 ]
~ cmatrix = [ 8.504249999999999 -2.6688699999999996 -1.00414 | -2.6688699999999996 8.787460000000001 -1.57246 | -1.00414 -1.57246 7.975060000000001 ]
~ normamps=532

New Linecode.MT_ABC:336AAAC_AAAC_195.7_NT_NT_1_N nphases=3 units=km
~ rmatrix = [ 0.256726 0.0831472 0.0819556 | 0.0831472 0.259152 0.0831472 | 0.0819556 0.0831472 0.256726 ]
~ xmatrix = [ 0.680054 0.288556 0.241141 | 0.288556 0.670249 0.288556 | 0.241141 0.288556 0.680054 ]
~ cmatrix = [ 8.10953 -2.07043 -1.06587 | -2.07043 8.575 -2.07043 | -1.06587 -2.07043 8.10953 ]
~ normamps=532

New Linecode.MT_ABC:336AAAC_AAAC_195.7_NT_NT_4_N nphases=3 units=km
~ rmatrix = [ 0.256726 0.0829696 0.0819556 | 0.0829696 0.258785 0.0829696 | 0.0819556 0.0829696 0.256726 ]
~ xmatrix = [ 0.680054 0.323223 0.241141 | 0.323223 0.671724 0.265956 | 0.241141 0.265956 0.680054 ]
~ cmatrix = [ 9.25232 -3.1813499999999997 -1.1809500000000002 | -3.1813499999999997 9.58089 -1.87843 | -1.1809500000000002 -1.87843 8.56423 ]
~ normamps=532

New Linecode.MT_ABC:336AAAC_AAAC_195.7_NT_NT_4_Y nphases=3 units=km
~ rmatrix = [ 0.256726 0.0829696 0.0819556 | 0.0829696 0.258785 0.0829696 | 0.0819556 0.0829696 0.256726 ]
~ xmatrix = [ 0.680054 0.323223 0.241141 | 0.323223 0.671724 0.265956 | 0.241141 0.265956 0.680054 ]
~ cmatrix = [ 9.25232 -3.1813499999999997 -1.1809500000000002 | -3.1813499999999997 9.58089 -1.87843 | -1.1809500000000002 -1.87843 8.56423 ]
~ normamps=532

New Linecode.MT_ABC:336AAAC_AAAC_2_AAAC_1/0_2_N nphases=3 units=km
~ rmatrix = [ 0.190104 0.0149441 0.0153338 | 0.0149441 0.189334 0.0149441 | 0.0153338 0.0149441 0.190104 ]
~ xmatrix = [ 0.663912 0.305265 0.224999 | 0.305265 0.651876 0.247998 | 0.224999 0.247998 0.663912 ]
~ cmatrix = [ 8.50421 -2.66892 -1.0041900000000001 | -2.66892 8.787400000000002 -1.57252 | -1.0041900000000001 -1.57252 7.975009999999999 ]
~ normamps=532

New Linecode.MT_ABC:336AAAC_ACSR_1/0_NT_NT_2_N nphases=3 units=km
~ rmatrix = [ 0.285112 0.111815 0.110342 | 0.111815 0.288096 0.111815 | 0.110342 0.111815 0.285112 ]
~ xmatrix = [ 0.723437 0.36756 0.284524 | 0.36756 0.717037 0.310294 | 0.284524 0.310294 0.723437 ]
~ cmatrix = [ 8.43568 -2.74829 -1.0826200000000001 | -2.74829 8.69571 -1.66333 | -1.0826200000000001 -1.66333 7.88524 ]
~ normamps=532

New Linecode.MT_ABC:336AAAC_ACSR_2_AAAC_1/0_2_N nphases=3 units=km
~ rmatrix = [ 0.221903 0.0473232 0.0471325 | 0.0473232 0.222304 0.0473232 | 0.0471325 0.0473232 0.221903 ]
~ xmatrix = [ 0.627987 0.268822 0.189073 | 0.268822 0.614908 0.211556 | 0.189073 0.211556 0.627987 ]
~ cmatrix = [ 8.6151 -2.5481100000000003 -0.878224 | -2.5481100000000003 8.91905 -1.43528 | -0.878224 -1.43528 8.1181 ]
~ normamps=532

New Linecode.MT_ABC:336AAAC_ACSR_2_AAAC_123.3_2_N nphases=3 units=km
~ rmatrix = [ 0.304741 0.132377 0.129971 | 0.132377 0.132377 0.132377 | 0.129971 0.132377 0.304741 ]
~ xmatrix = [ 0.639418 0.280998 0.200504 | 0.280998 0.627861 0.223732 | 0.200504 0.223732 0.639418 ]
~ cmatrix = [ 8.61514 -2.54806 -0.878177 | -2.54806 8.919099999999998 -1.43523 | -0.878177 -1.43523 8.11815 ]
~ normamps=532

New Linecode.MT_ABC:336AAAC_ACSR_2_NT_NT_4_N nphases=3 units=km
~ rmatrix = [ 0.30525 0.132254 0.13048 | 0.132254 0.30884 0.132254 | 0.13048 0.132254 0.30525 ]
~ xmatrix = [ 0.763334 0.40832 0.324421 | 0.40832 0.758677 0.351053 | 0.324421 0.351053 0.763334 ]
~ cmatrix = [ 8.43462 -2.7494400000000003 -1.08382 | -2.7494400000000003 8.69446 -1.66463 | -1.08382 -1.66463 7.8838799999999996 ]
~ normamps=532

New Linecode.MT_ABC:336AAAC_CO_TR_1/0_AAAC_1/0_2_N nphases=3 units=km
~ rmatrix = [ 0.190104 0.0149441 0.0153338 | 0.0149441 0.189334 0.0149441 | 0.0153338 0.0149441 0.190104 ]
~ xmatrix = [ 0.663912 0.305265 0.224999 | 0.305265 0.651876 0.247998 | 0.224999 0.247998 0.663912 ]
~ cmatrix = [ 8.50421 -2.66892 -1.0041900000000001 | -2.66892 8.787400000000002 -1.57252 | -1.0041900000000001 -1.57252 7.975009999999999 ]
~ normamps=532

New Linecode.MT_ABC:336AAAC_NT_NT_AAAC_1/0_2_N nphases=3 units=km
~ rmatrix = [ 0.190104 0.0149441 0.0153338 | 0.0149441 0.189334 0.0149441 | 0.0153338 0.0149441 0.190104 ]
~ xmatrix = [ 0.663912 0.305265 0.224999 | 0.305265 0.651876 0.247998 | 0.224999 0.247998 0.663912 ]
~ cmatrix = [ 8.50421 -2.66892 -1.0041900000000001 | -2.66892 8.787400000000002 -1.57252 | -1.0041900000000001 -1.57252 7.975009999999999 ]
~ normamps=532

New Linecode.MT_ABC:336AAAC_NT_NT_AAAC_1/0_2_Y nphases=3 units=km
~ rmatrix = [ 0.190104 0.0149441 0.0153338 | 0.0149441 0.189334 0.0149441 | 0.0153338 0.0149441 0.190104 ]
~ xmatrix = [ 0.663912 0.305265 0.224999 | 0.305265 0.651876 0.247998 | 0.224999 0.247998 0.663912 ]
~ cmatrix = [ 8.50421 -2.66892 -1.0041900000000001 | -2.66892 8.787400000000002 -1.57252 | -1.0041900000000001 -1.57252 7.975009999999999 ]
~ normamps=532

New Linecode.MT_ABC:336AAAC_NT_NT_AAAC_1/0_4_N nphases=3 units=km
~ rmatrix = [ 0.190675 0.0156016 0.0156016 | 0.0156016 0.190074 0.0156016 | 0.0156016 0.0156016 0.190675 ]
~ xmatrix = [ 0.672459 0.315296 0.233545 | 0.315296 0.663457 0.25803 | 0.233545 0.25803 0.672459 ]
~ cmatrix = [ 8.4542 -2.72812 -1.06158 | -2.72812 8.71766 -1.64042 | -1.06158 -1.64042 7.90914 ]
~ normamps=532

New Linecode.MT_ABC:336AAAC_NT_NT_AAAC_123.3_2_N nphases=3 units=km
~ rmatrix = [ 0.295427 0.122858 0.120657 | 0.122858 0.299901 0.122858 | 0.120657 0.122858 0.295427 ]
~ xmatrix = [ 0.707684 0.35053 0.268771 | 0.35053 0.698682 0.293264 | 0.268771 0.293264 0.707684 ]
~ cmatrix = [ 9.30071 -3.12302 -1.12463 | -3.12302 9.65071 -1.8106000000000002 | -1.12463 -1.8106000000000002 8.62978 ]
~ normamps=532

New Linecode.MT_ABC:336AAAC_NT_NT_AAAC_123.3_2_Y nphases=3 units=km
~ rmatrix = [ 0.295427 0.122858 0.120657 | 0.122858 0.299901 0.122858 | 0.120657 0.122858 0.295427 ]
~ xmatrix = [ 0.707684 0.35053 0.268771 | 0.35053 0.698682 0.293264 | 0.268771 0.293264 0.707684 ]
~ cmatrix = [ 9.30071 -3.12302 -1.12463 | -3.12302 9.65071 -1.8106000000000002 | -1.12463 -1.8106000000000002 8.62978 ]
~ normamps=532

New Linecode.MT_ABC:336AAAC_NT_NT_AAAC_123.3_NE_N nphases=3 units=km
~ rmatrix = [ 0.295427 0.122858 0.120657 | 0.122858 0.299901 0.122858 | 0.120657 0.122858 0.295427 ]
~ xmatrix = [ 0.707684 0.35053 0.268771 | 0.35053 0.698682 0.293264 | 0.268771 0.293264 0.707684 ]
~ cmatrix = [ 9.30071 -3.12302 -1.12463 | -3.12302 9.65071 -1.8106000000000002 | -1.12463 -1.8106000000000002 8.62978 ]
~ normamps=532

New Linecode.MT_ABC:336AAAC_NT_NT_AAAC_246.9_2_N nphases=3 units=km
~ rmatrix = [ 0.246792 0.073104 0.0720218 | 0.073104 0.249004 0.073104 | 0.0720218 0.073104 0.246792 ]
~ xmatrix = [ 0.664502 0.306061 0.225589 | 0.306061 0.652889 0.248795 | 0.225589 0.248795 0.664502 ]
~ cmatrix = [ 8.51444 -2.65754 -0.992535 | -2.65754 8.80007 -1.55956 | -0.992535 -1.55956 7.9882800000000005 ]
~ normamps=532

New Linecode.MT_ABC:336AAAC_NT_NT_AAAC_246.9_2_Y nphases=3 units=km
~ rmatrix = [ 0.246792 0.073104 0.0720218 | 0.073104 0.249004 0.073104 | 0.0720218 0.073104 0.246792 ]
~ xmatrix = [ 0.664502 0.306061 0.225589 | 0.306061 0.652889 0.248795 | 0.225589 0.248795 0.664502 ]
~ cmatrix = [ 8.51444 -2.65754 -0.992535 | -2.65754 8.80007 -1.55956 | -0.992535 -1.55956 7.9882800000000005 ]
~ normamps=532

New Linecode.MT_ABC:336AAAC_NT_NT_AAAC_4/0_2_N nphases=3 units=km
~ rmatrix = [ 0.189258 0.0140987 0.0144884 | 0.0140987 0.188489 0.0140987 | 0.0144884 0.0140987 0.189258 ]
~ xmatrix = [ 0.657404 0.298584 0.21849 | 0.298584 0.645018 0.241318 | 0.21849 0.241318 0.657404 ]
~ cmatrix = [ 8.514429999999999 -2.6575499999999996 -0.992548 | -2.6575499999999996 8.80005 -1.55957 | -0.992548 -1.55957 7.98826 ]
~ normamps=532

New Linecode.MT_ABC:336AAAC_NT_NT_AAAC_4/0_2_Y nphases=3 units=km
~ rmatrix = [ 0.189258 0.0140987 0.0144884 | 0.0140987 0.188489 0.0140987 | 0.0144884 0.0140987 0.189258 ]
~ xmatrix = [ 0.657404 0.298584 0.21849 | 0.298584 0.645018 0.241318 | 0.21849 0.241318 0.657404 ]
~ cmatrix = [ 8.514429999999999 -2.6575499999999996 -0.992548 | -2.6575499999999996 8.80005 -1.55957 | -0.992548 -1.55957 7.98826 ]
~ normamps=532

New Linecode.MT_ABC:336AAAC_NT_NT_AAAC_4/0_5_N nphases=3 units=km
~ rmatrix = [ 0.188457 0.0141959 0.0145785 | 0.0141959 0.189493 0.0151202 | 0.0145785 0.0151202 0.190298 ]
~ xmatrix = [ 0.644486 0.213465 0.287441 | 0.213465 0.661062 0.228283 | 0.287441 0.228283 0.673149 ]
~ cmatrix = [ 8.433710000000001 -1.12197 -2.39323 | -1.12197 7.82862 -1.20614 | -2.39323 -1.20614 8.30633 ]
~ normamps=532

New Linecode.MT_ABC:336AAAC_NT_NT_AAC_1/0_2_N nphases=3 units=km
~ rmatrix = [ 0.294473 0.121878 0.119703 | 0.121878 0.298895 0.121878 | 0.119703 0.121878 0.294473 ]
~ xmatrix = [ 0.70814 0.350995 0.269227 | 0.350995 0.699155 0.293728 | 0.269227 0.293728 0.70814 ]
~ cmatrix = [ 8.501999999999999 -2.67138 -1.0067 | -2.67138 8.78467 -1.57532 | -1.0067 -1.57532 7.9721400000000004 ]
~ normamps=532

New Linecode.MT_ABC:336AAAC_NT_NT_AAC_1/0_2_Y nphases=3 units=km
~ rmatrix = [ 0.294473 0.121878 0.119703 | 0.121878 0.298895 0.121878 | 0.119703 0.121878 0.294473 ]
~ xmatrix = [ 0.70814 0.350995 0.269227 | 0.350995 0.699155 0.293728 | 0.269227 0.293728 0.70814 ]
~ cmatrix = [ 8.501999999999999 -2.67138 -1.0067 | -2.67138 8.78467 -1.57532 | -1.0067 -1.57532 7.9721400000000004 ]
~ normamps=532

New Linecode.MT_ABC:336AAAC_NT_NT_ACSR_1/0_2_N nphases=3 units=km
~ rmatrix = [ 0.287945 0.115149 0.113175 | 0.115149 0.291958 0.115149 | 0.113175 0.115149 0.287945 ]
~ xmatrix = [ 0.71736 0.360433 0.278447 | 0.360433 0.708816 0.303166 | 0.278447 0.303166 0.71736 ]
~ cmatrix = [ 8.479840000000001 -2.69603 -1.03194 | -2.69603 8.757259999999999 -1.6033899999999999 | -1.03194 -1.6033899999999999 7.94341 ]
~ normamps=532

New Linecode.MT_ABC:336AAAC_NT_NT_NT_NT_2_N nphases=3 units=km
~ rmatrix = [ 0.294473 0.121878 0.119703 | 0.121878 0.298895 0.121878 | 0.119703 0.121878 0.294473 ]
~ xmatrix = [ 0.70814 0.350995 0.269227 | 0.350995 0.699155 0.293728 | 0.269227 0.293728 0.70814 ]
~ cmatrix = [ 8.501999999999999 -2.67138 -1.0067 | -2.67138 8.78467 -1.57532 | -1.0067 -1.57532 7.9721400000000004 ]
~ normamps=532

New Linecode.MT_ABC:336AAAC_NT_NT_NT_NT_2_Y nphases=3 units=km
~ rmatrix = [ 0.294473 0.121878 0.119703 | 0.121878 0.298895 0.121878 | 0.119703 0.121878 0.294473 ]
~ xmatrix = [ 0.70814 0.350995 0.269227 | 0.350995 0.699155 0.293728 | 0.269227 0.293728 0.70814 ]
~ cmatrix = [ 8.501999999999999 -2.67138 -1.0067 | -2.67138 8.78467 -1.57532 | -1.0067 -1.57532 7.9721400000000004 ]
~ normamps=532

New Linecode.MT_ABC:336AAAC_NT_NT_NT_NT_4_N nphases=3 units=km
~ rmatrix = [ 0.229956 0.0829696 0.0819556 | 0.0829696 0.232015 0.0829696 | 0.0819556 0.0829696 0.229956 ]
~ xmatrix = [ 0.676711 0.323223 0.241141 | 0.323223 0.668381 0.265956 | 0.241141 0.265956 0.676711 ]
~ cmatrix = [ 8.523660000000001 -2.7588600000000003 -1.06609 | -2.7588600000000003 8.79299 -1.6536700000000002 | -1.06609 -1.6536700000000002 7.96906 ]
~ normamps=532

New Linecode.MT_ABC:336AAAC_NT_NT_NT_NT_7_N nphases=3 units=km
~ rmatrix = [ 0.294473 0.121878 0.119703 | 0.121878 0.298895 0.121878 | 0.119703 0.121878 0.294473 ]
~ xmatrix = [ 0.70814 0.350995 0.269227 | 0.350995 0.699155 0.293728 | 0.269227 0.293728 0.70814 ]
~ cmatrix = [ 8.501999999999999 -2.67138 -1.0067 | -2.67138 8.78467 -1.57532 | -1.0067 -1.57532 7.9721400000000004 ]
~ normamps=532

New Linecode.MT_ABC:336AAAC_NT_NT_NT_NT_NE_N nphases=3 units=km
~ rmatrix = [ 0.294473 0.121878 0.119703 | 0.121878 0.298895 0.121878 | 0.119703 0.121878 0.294473 ]
~ xmatrix = [ 0.70814 0.350995 0.269227 | 0.350995 0.699155 0.293728 | 0.269227 0.293728 0.70814 ]
~ cmatrix = [ 8.501999999999999 -2.67138 -1.0067 | -2.67138 8.78467 -1.57532 | -1.0067 -1.57532 7.9721400000000004 ]
~ normamps=532

New Linecode.MT_ABC:394AAAC_AAAC_1/0_AAAC_195.7_2_N nphases=3 units=km
~ rmatrix = [ 0.241579 0.095588 0.0935791 | 0.095588 0.245681 0.095588 | 0.0935791 0.095588 0.241579 ]
~ xmatrix = [ 0.597149 0.240132 0.161579 | 0.240132 0.581641 0.182866 | 0.161579 0.182866 0.597149 ]
~ cmatrix = [ 8.7217 -2.5282199999999997 -0.839059 | -2.5282199999999997 9.06125 -1.38932 | -0.839059 -1.38932 8.22931 ]
~ normamps=590

New Linecode.MT_ABC:394AAAC_AAAC_123.3_AAAC_246.9_2_N nphases=3 units=km
~ rmatrix = [ 0.246792 0.073104 0.0720218 | 0.073104 0.249004 0.073104 | 0.0720218 0.073104 0.246792 ]
~ xmatrix = [ 0.664502 0.306061 0.225589 | 0.306061 0.652889 0.248795 | 0.225589 0.248795 0.664502 ]
~ cmatrix = [ 8.51444 -2.65754 -0.992535 | -2.65754 8.80007 -1.55956 | -0.992535 -1.55956 7.9882800000000005 ]
~ normamps=590

New Linecode.MT_ABC:394AAAC_AAAC_123.3_NT_NT_2_N nphases=3 units=km
~ rmatrix = [ 0.296703 0.124413 0.121933 | 0.124413 0.301753 0.124413 | 0.121933 0.124413 0.296703 ]
~ xmatrix = [ 0.705109 0.347403 0.266196 | 0.347403 0.694977 0.290137 | 0.266196 0.290137 0.705109 ]
~ cmatrix = [ 8.48307 -2.6854299999999998 -1.02739 | -2.6854299999999998 8.777099999999999 -1.59031 | -1.02739 -1.59031 7.94959 ]
~ normamps=590

New Linecode.MT_ABC:394AAAC_AAAC_123.3_NT_NT_2_Y nphases=3 units=km
~ rmatrix = [ 0.296703 0.124413 0.121933 | 0.124413 0.301753 0.124413 | 0.121933 0.124413 0.296703 ]
~ xmatrix = [ 0.705109 0.347403 0.266196 | 0.347403 0.694977 0.290137 | 0.266196 0.290137 0.705109 ]
~ cmatrix = [ 8.48307 -2.6854299999999998 -1.02739 | -2.6854299999999998 8.777099999999999 -1.59031 | -1.02739 -1.59031 7.94959 ]
~ normamps=590

New Linecode.MT_ABC:394AAAC_AAAC_123.3_NT_NT_3_Y nphases=3 units=km
~ rmatrix = [ 0.257593 0.10638 0.109593 | 0.10638 0.251352 0.10638 | 0.109593 0.10638 0.257593 ]
~ xmatrix = [ 0.726954 0.350617 0.307873 | 0.350617 0.739977 0.321306 | 0.307873 0.321306 0.726954 ]
~ cmatrix = [ 8.234160000000001 -2.2599500000000003 -1.50096 | -2.2599500000000003 8.14608 -1.71668 | -1.50096 -1.71668 7.96895 ]
~ normamps=590

New Linecode.MT_ABC:394AAAC_AAAC_195.7_NT_NT_1_N nphases=3 units=km
~ rmatrix = [ 0.229956 0.0831472 0.0819556 | 0.0831472 0.232382 0.0831472 | 0.0819556 0.0831472 0.229956 ]
~ xmatrix = [ 0.676711 0.288556 0.241141 | 0.288556 0.666906 0.288556 | 0.241141 0.288556 0.676711 ]
~ cmatrix = [ 8.166690000000001 -2.09646 -1.0763 | -2.09646 8.640979999999999 -2.09646 | -1.0763 -2.09646 8.166690000000001 ]
~ normamps=590

New Linecode.MT_ABC:394AAAC_AAAC_195.7_NT_NT_1_Y nphases=3 units=km
~ rmatrix = [ 0.229956 0.0831472 0.0819556 | 0.0831472 0.232382 0.0831472 | 0.0819556 0.0831472 0.229956 ]
~ xmatrix = [ 0.676711 0.288556 0.241141 | 0.288556 0.666906 0.288556 | 0.241141 0.288556 0.676711 ]
~ cmatrix = [ 8.166690000000001 -2.09646 -1.0763 | -2.09646 8.640979999999999 -2.09646 | -1.0763 -2.09646 8.166690000000001 ]
~ normamps=590

New Linecode.MT_ABC:394AAAC_AAAC_195.7_NT_NT_2_N nphases=3 units=km
~ rmatrix = [ 0.23092 0.0843979 0.0829202 | 0.0843979 0.233941 0.0843979 | 0.0829202 0.0843979 0.23092 ]
~ xmatrix = [ 0.669022 0.313571 0.233452 | 0.313571 0.656678 0.256305 | 0.233452 0.256305 0.669022 ]
~ cmatrix = [ 8.5475 -2.7215 -1.03756 | -2.7215 8.8468 -1.60955 | -1.03756 -1.60955 8.00313 ]
~ normamps=590

New Linecode.MT_ABC:394AAAC_AAAC_195.7_NT_NT_2_Y nphases=3 units=km
~ rmatrix = [ 0.23092 0.0843979 0.0829202 | 0.0843979 0.233941 0.0843979 | 0.0829202 0.0843979 0.23092 ]
~ xmatrix = [ 0.669022 0.313571 0.233452 | 0.313571 0.656678 0.256305 | 0.233452 0.256305 0.669022 ]
~ cmatrix = [ 8.5475 -2.7215 -1.03756 | -2.7215 8.8468 -1.60955 | -1.03756 -1.60955 8.00313 ]
~ normamps=590

New Linecode.MT_ABC:394AAAC_AAAC_195.7_NT_NT_4_N nphases=3 units=km
~ rmatrix = [ 0.229956 0.0829696 0.0819556 | 0.0829696 0.232015 0.0829696 | 0.0819556 0.0829696 0.229956 ]
~ xmatrix = [ 0.676711 0.323223 0.241141 | 0.323223 0.668381 0.265956 | 0.241141 0.265956 0.676711 ]
~ cmatrix = [ 8.523660000000001 -2.7588600000000003 -1.06609 | -2.7588600000000003 8.79299 -1.6536700000000002 | -1.06609 -1.6536700000000002 7.96906 ]
~ normamps=590

New Linecode.MT_ABC:394AAAC_AAAC_195.7_NT_NT_4_Y nphases=3 units=km
~ rmatrix = [ 0.229956 0.0829696 0.0819556 | 0.0829696 0.232015 0.0829696 | 0.0819556 0.0829696 0.229956 ]
~ xmatrix = [ 0.676711 0.323223 0.241141 | 0.323223 0.668381 0.265956 | 0.241141 0.265956 0.676711 ]
~ cmatrix = [ 8.523660000000001 -2.7588600000000003 -1.06609 | -2.7588600000000003 8.79299 -1.6536700000000002 | -1.06609 -1.6536700000000002 7.96906 ]
~ normamps=590

New Linecode.MT_ABC:394AAAC_AAAC_246.9_AAAC_246.9_13_N nphases=3 units=km
~ rmatrix = [ 0.20722 0.05922 0.05922 | 0.05922 0.20722 0.05922 | 0.05922 0.05922 0.20722 ]
~ xmatrix = [ 0.88334 0.49483 0.4834 | 0.49483 0.88334 0.53398 | 0.4834 0.53398 0.88334 ]
~ cmatrix = [ 9.12 -1.98 -1.41 | -1.98 9.83 -2.7 | -1.41 -2.7 10.42 ]
~ normamps=590

New Linecode.MT_ABC:394AAAC_AAAC_246.9_AAAC_246.9_2.1_Y nphases=3 units=km
~ rmatrix = [ 0.208567 0.0617075 0.060567 | 0.0617075 0.21091 0.0617075 | 0.060567 0.0617075 0.208567 ]
~ xmatrix = [ 0.5723 0.214411 0.136729 | 0.214411 0.555019 0.157144 | 0.136729 0.157144 0.5723 ]
~ cmatrix = [ 8.738710000000001 -2.50897 -0.819633 | -2.50897 9.08303 -1.36734 | -0.819633 -1.36734 8.2515 ]
~ normamps=590

New Linecode.MT_ABC:394AAAC_AAAC_246.9_AAAC_246.9_2_N nphases=3 units=km
~ rmatrix = [ 0.208567 0.0617075 0.060567 | 0.0617075 0.21091 0.0617075 | 0.060567 0.0617075 0.208567 ]
~ xmatrix = [ 0.5723 0.214411 0.136729 | 0.214411 0.555019 0.157144 | 0.136729 0.157144 0.5723 ]
~ cmatrix = [ 8.738710000000001 -2.50897 -0.819633 | -2.50897 9.08303 -1.36734 | -0.819633 -1.36734 8.2515 ]
~ normamps=590

New Linecode.MT_ABC:394AAAC_AAAC_246.9_AAAC_246.9_2_Y nphases=3 units=km
~ rmatrix = [ 0.208567 0.0617075 0.060567 | 0.0617075 0.21091 0.0617075 | 0.060567 0.0617075 0.208567 ]
~ xmatrix = [ 0.5723 0.214411 0.136729 | 0.214411 0.555019 0.157144 | 0.136729 0.157144 0.5723 ]
~ cmatrix = [ 8.738710000000001 -2.50897 -0.819633 | -2.50897 9.08303 -1.36734 | -0.819633 -1.36734 8.2515 ]
~ normamps=590

New Linecode.MT_ABC:394AAAC_AAAC_246.9_AAAC_246.9_3.1_N nphases=3 units=km
~ rmatrix = [ 0.207744 0.0628538 0.0597443 | 0.0628538 0.216829 0.0628538 | 0.0597443 0.0628538 0.207744 ]
~ xmatrix = [ 0.586906 0.186475 0.167824 | 0.186475 0.545503 0.157164 | 0.167824 0.157164 0.586906 ]
~ cmatrix = [ 8.391680000000001 -1.9153900000000001 -1.32045 | -1.9153900000000001 8.915930000000001 -1.3207799999999998 | -1.32045 -1.3207799999999998 8.17586 ]
~ normamps=590

New Linecode.MT_ABC:394AAAC_AAAC_246.9_AAAC_246.9_3_N nphases=3 units=km
~ rmatrix = [ 0.207744 0.0628538 0.0597443 | 0.0628538 0.216829 0.0628538 | 0.0597443 0.0628538 0.207744 ]
~ xmatrix = [ 0.586906 0.186475 0.167824 | 0.186475 0.545503 0.157164 | 0.167824 0.157164 0.586906 ]
~ cmatrix = [ 8.391680000000001 -1.9153900000000001 -1.32045 | -1.9153900000000001 8.915930000000001 -1.3207799999999998 | -1.32045 -1.3207799999999998 8.17586 ]
~ normamps=590

New Linecode.MT_ABC:394AAAC_AAAC_246.9_AAAC_246.9_4_N nphases=3 units=km
~ rmatrix = [ 0.20803 0.0609829 0.0600305 | 0.0609829 0.209982 0.0609829 | 0.0600305 0.0609829 0.20803 ]
~ xmatrix = [ 0.578457 0.222016 0.142886 | 0.222016 0.564137 0.16475 | 0.142886 0.16475 0.578457 ]
~ cmatrix = [ 8.71243 -2.54858 -0.850896 | -2.54858 9.02724 -1.41395 | -0.850896 -1.41395 8.21438 ]
~ normamps=590

New Linecode.MT_ABC:394AAAC_AAAC_246.9_AAAC_246.9_4_Y nphases=3 units=km
~ rmatrix = [ 0.20803 0.0609829 0.0600305 | 0.0609829 0.209982 0.0609829 | 0.0600305 0.0609829 0.20803 ]
~ xmatrix = [ 0.578457 0.222016 0.142886 | 0.222016 0.564137 0.16475 | 0.142886 0.16475 0.578457 ]
~ cmatrix = [ 8.71243 -2.54858 -0.850896 | -2.54858 9.02724 -1.41395 | -0.850896 -1.41395 8.21438 ]
~ normamps=590

New Linecode.MT_ABC:394AAAC_AAAC_246.9_NT_NT_3_N nphases=3 units=km
~ rmatrix = [ 0.214665 0.0651351 0.0666645 | 0.0651351 0.211727 0.0651351 | 0.0666645 0.0651351 0.214665 ]
~ xmatrix = [ 0.690274 0.315836 0.271193 | 0.315836 0.707 0.286525 | 0.271193 0.286525 0.690274 ]
~ cmatrix = [ 8.24099 -2.2553 -1.4938200000000001 | -2.2553 8.14925 -1.71182 | -1.4938200000000001 -1.71182 7.97642 ]
~ normamps=590

New Linecode.MT_ABC:394AAAC_ACSR_246.9_NT_NT_2_Y nphases=3 units=km
~ rmatrix = [ 0.22065 0.0738735 0.0726502 | 0.0738735 0.223156 0.0738735 | 0.0726502 0.0738735 0.22065 ]
~ xmatrix = [ 0.657838 0.302027 0.222268 | 0.302027 0.644763 0.244761 | 0.222268 0.244761 0.657838 ]
~ cmatrix = [ 8.55705 -2.7104999999999997 -1.02663 | -2.7104999999999997 8.85947 -1.59696 | -1.02663 -1.59696 8.015649999999999 ]
~ normamps=590

New Linecode.MT_ABC:394AAAC_NT_NT_AAAC_123.3_2_N nphases=3 units=km
~ rmatrix = [ 0.268657 0.122858 0.120657 | 0.122858 0.273131 0.122858 | 0.120657 0.122858 0.268657 ]
~ xmatrix = [ 0.704341 0.35053 0.268771 | 0.35053 0.695339 0.293264 | 0.268771 0.293264 0.704341 ]
~ cmatrix = [ 8.568900000000001 -2.70477 -1.0140500000000001 | -2.70477 8.857240000000001 -1.5915199999999998 | -1.0140500000000001 -1.5915199999999998 8.02891 ]
~ normamps=590

New Linecode.MT_ABC:394AAAC_NT_NT_AAAC_195.7_2_N nphases=3 units=km
~ rmatrix = [ 0.23092 0.0843979 0.0829202 | 0.0843979 0.233941 0.0843979 | 0.0829202 0.0843979 0.23092 ]
~ xmatrix = [ 0.669022 0.313571 0.256305 | 0.313571 0.656678 0.256305 | 0.256305 0.256305 0.669022 ]
~ cmatrix = [ 8.5475 -2.7215 -1.03756 | -2.7215 8.8468 -1.60955 | -1.03756 -1.60955 8.00313 ]
~ normamps=590

New Linecode.MT_ABC:394AAAC_NT_NT_AAAC_195.7_2_Y nphases=3 units=km
~ rmatrix = [ 0.23092 0.0843979 0.0829202 | 0.0843979 0.233941 0.0843979 | 0.0829202 0.0843979 0.23092 ]
~ xmatrix = [ 0.669022 0.313571 0.256305 | 0.313571 0.656678 0.256305 | 0.256305 0.256305 0.669022 ]
~ cmatrix = [ 8.5475 -2.7215 -1.03756 | -2.7215 8.8468 -1.60955 | -1.03756 -1.60955 8.00313 ]
~ normamps=590

New Linecode.MT_ABC:394AAAC_NT_NT_AAAC_195.7_4_N nphases=3 units=km
~ rmatrix = [ 0.231911 0.0852762 0.0839106 | 0.0852762 0.234696 0.0852762 | 0.0839106 0.0852762 0.231911 ]
~ xmatrix = [ 0.668802 0.313943 0.233232 | 0.313943 0.657673 0.256676 | 0.233232 0.256676 0.668802 ]
~ cmatrix = [ 8.5756 -2.69732 -1.0064099999999998 | -2.69732 8.86554 -1.58302 | -1.0064099999999998 -1.58302 8.03761 ]
~ normamps=590

New Linecode.MT_ABC:394AAAC_NT_NT_AAAC_246.9_2_N nphases=3 units=km
~ rmatrix = [ 0.22065 0.0738735 0.0726502 | 0.0738735 0.223156 0.0738735 | 0.0726502 0.0738735 0.22065 ]
~ xmatrix = [ 0.657838 0.302027 0.222268 | 0.302027 0.644763 0.244761 | 0.222268 0.244761 0.657838 ]
~ cmatrix = [ 8.55705 -2.7104999999999997 -1.02663 | -2.7104999999999997 8.85947 -1.59696 | -1.02663 -1.59696 8.015649999999999 ]
~ normamps=590

New Linecode.MT_ABC:394AAAC_NT_NT_AAAC_246.9_2_Y nphases=3 units=km
~ rmatrix = [ 0.22065 0.0738735 0.0726502 | 0.0738735 0.223156 0.0738735 | 0.0726502 0.0738735 0.22065 ]
~ xmatrix = [ 0.657838 0.302027 0.222268 | 0.302027 0.644763 0.244761 | 0.222268 0.244761 0.657838 ]
~ cmatrix = [ 8.55705 -2.7104999999999997 -1.02663 | -2.7104999999999997 8.85947 -1.59696 | -1.02663 -1.59696 8.015649999999999 ]
~ normamps=590

New Linecode.MT_ABC:394AAAC_NT_NT_AAAC_246.9_3_N nphases=3 units=km
~ rmatrix = [ 0.217689 0.071856 0.0696885 | 0.071856 0.222234 0.071856 | 0.0696885 0.071856 0.217689 ]
~ xmatrix = [ 0.67365 0.299947 0.23808 | 0.299947 0.649546 0.252146 | 0.23808 0.252146 0.67365 ]
~ cmatrix = [ 8.42104 -2.46854 -1.08214 | -2.46854 8.740450000000001 -1.5523799999999999 | -1.08214 -1.5523799999999999 7.999569999999999 ]
~ normamps=590

New Linecode.MT_ABC:394AAAC_NT_NT_AAAC_246.9_3_Y nphases=3 units=km
~ rmatrix = [ 0.217689 0.071856 0.0696885 | 0.071856 0.222234 0.071856 | 0.0696885 0.071856 0.217689 ]
~ xmatrix = [ 0.67365 0.299947 0.23808 | 0.299947 0.649546 0.252146 | 0.23808 0.252146 0.67365 ]
~ cmatrix = [ 8.42104 -2.46854 -1.08214 | -2.46854 8.740450000000001 -1.5523799999999999 | -1.08214 -1.5523799999999999 7.999569999999999 ]
~ normamps=590

New Linecode.MT_ABC:4CO_SO_NT_NT_NT_NT_NE_N nphases=3 units=km
~ rmatrix = [ 1381665631.0 0.059229335 0.059229335 | 0.059229335 1381665631.0 0.059229335 | 0.059229335 0.059229335 138166563.0 ]
~ xmatrix = [ 0.990118086 0.883343692 0.883343692 | 0.883343692 0.990118086 0.883343692 | 0.883343692 0.883343692 0.990118086 ]
~ normamps=125

New Linecode.MT_ABC:4/0ACSR_AAAC_195.7_NT_NT_4_N nphases=3 units=km
~ rmatrix = [ 0.376797 0.0829696 0.0819556 | 0.0829696 0.378857 0.0829696 | 0.0819556 0.0829696 0.376797 ]
~ xmatrix = [ 0.754266 0.323223 0.241141 | 0.323223 0.745936 0.265956 | 0.241141 0.265956 0.754266 ]
~ cmatrix = [ 7.81901 -2.37098 -0.9521109999999999 | -2.37098 8.03711 -1.44231 | -0.9521109999999999 -1.44231 7.3783900000000004 ]
~ normamps=357

New Linecode.MT_ABC:4/0ACSR_AAAC_195.7_NT_NT_4_Y nphases=3 units=km
~ rmatrix = [ 0.376797 0.0829696 0.0819556 | 0.0829696 0.378857 0.0829696 | 0.0819556 0.0829696 0.376797 ]
~ xmatrix = [ 0.754266 0.323223 0.241141 | 0.323223 0.745936 0.265956 | 0.241141 0.265956 0.754266 ]
~ cmatrix = [ 7.81901 -2.37098 -0.9521109999999999 | -2.37098 8.03711 -1.44231 | -0.9521109999999999 -1.44231 7.3783900000000004 ]
~ normamps=357

New Linecode.MT_ABC:4/0ACSR_ACSR_1/0_NT_NT_1_N nphases=3 units=km
~ rmatrix = [ 0.405183 0.112073 0.110342 | 0.112073 0.408698 0.112073 | 0.110342 0.112073 0.405183 ]
~ xmatrix = [ 0.797649 0.333061 0.284524 | 0.333061 0.790116 0.333061 | 0.284524 0.333061 0.797649 ]
~ cmatrix = [ 7.51139 -1.84264 -0.985772 | -1.84264 7.8913400000000005 -1.84264 | -0.985772 -1.84264 7.51139 ]
~ normamps=357

New Linecode.MT_ABC:4/0ACSR_ACSR_1/0_NT_NT_1_Y nphases=3 units=km
~ rmatrix = [ 0.405183 0.112073 0.110342 | 0.112073 0.408698 0.112073 | 0.110342 0.112073 0.405183 ]
~ xmatrix = [ 0.797649 0.333061 0.284524 | 0.333061 0.790116 0.333061 | 0.284524 0.333061 0.797649 ]
~ cmatrix = [ 7.51139 -1.84264 -0.985772 | -1.84264 7.8913400000000005 -1.84264 | -0.985772 -1.84264 7.51139 ]
~ normamps=357

New Linecode.MT_ABC:4/0ACSR_ACSR_1/0_NT_NT_3_N nphases=3 units=km
~ rmatrix = [ 0.3981 0.10038 0.103258 | 0.10038 0.392511 0.10038 | 0.103258 0.10038 0.3981 ]
~ xmatrix = [ 0.813032 0.3588 0.316395 | 0.3588 0.825387 0.329488 | 0.316395 0.329488 0.813032 ]
~ cmatrix = [ 7.5653500000000005 -1.9771900000000002 -1.34033 | -1.9771900000000002 7.49184 -1.51923 | -1.34033 -1.51923 7.351629999999999 ]
~ normamps=357

New Linecode.MT_ABC:4/0ACSR_ACSR_1/0_NT_NT_3_Y nphases=3 units=km
~ rmatrix = [ 0.414179 0.119093 0.119338 | 0.119093 0.413691 0.119093 | 0.119338 0.119093 0.414179 ]
~ xmatrix = [ 0.778481 0.339468 0.265355 | 0.339468 0.779511 0.291667 | 0.265355 0.291667 0.778481 ]
~ cmatrix = [ 7.7952200000000005 -2.14413 -0.909751 | -2.14413 7.89347 -1.38352 | -0.909751 -1.38352 7.455299999999999 ]
~ normamps=357

New Linecode.MT_ABC:4/0ACSR_ACSR_1/0_NT_NT_4_N nphases=3 units=km
~ rmatrix = [ 0.405183 0.111815 0.110342 | 0.111815 0.408167 0.111815 | 0.110342 0.111815 0.405183 ]
~ xmatrix = [ 0.797649 0.36756 0.284524 | 0.36756 0.797649 0.310294 | 0.284524 0.310294 0.797649 ]
~ cmatrix = [ 7.79704 -2.39485 -0.976837 | -2.39485 8.01117 -1.4691800000000002 | -0.976837 -1.4691800000000002 7.35056 ]
~ normamps=357

New Linecode.MT_ABC:4/0ACSR_ACSR_1/0_NT_NT_4_Y nphases=3 units=km
~ rmatrix = [ 0.405183 0.111815 0.110342 | 0.111815 0.408167 0.111815 | 0.110342 0.111815 0.405183 ]
~ xmatrix = [ 0.797649 0.36756 0.284524 | 0.36756 0.797649 0.310294 | 0.284524 0.310294 0.797649 ]
~ cmatrix = [ 7.79704 -2.39485 -0.976837 | -2.39485 8.01117 -1.4691800000000002 | -0.976837 -1.4691800000000002 7.35056 ]
~ normamps=357

New Linecode.MT_ABC:4/0ACSR_ACSR_2_NT_NT_4_N nphases=3 units=km
~ rmatrix = [ 0.425321 0.132254 0.13048 | 0.132254 0.428911 0.132254 | 0.13048 0.132254 0.425321 ]
~ xmatrix = [ 0.837547 0.40832 0.324421 | 0.40832 0.832889 0.351053 | 0.324421 0.351053 0.837547 ]
~ cmatrix = [ 7.79606 -2.3959099999999998 -0.9779420000000001 | -2.3959099999999998 8.01001 -1.47038 | -0.9779420000000001 -1.47038 7.3493200000000005 ]
~ normamps=357

New Linecode.MT_ABC:4/0ACSR_ACSR_4/0_NT_NT_1_N nphases=3 units=km
~ rmatrix = [ 0.371976 0.0781859 0.0771349 | 0.0781859 0.374118 0.0781859 | 0.0771349 0.0781859 0.371976 ]
~ xmatrix = [ 0.762496 0.296966 0.24937 | 0.296966 0.753056 0.296966 | 0.24937 0.296966 0.762496 ]
~ cmatrix = [ 7.5226 -1.8308499999999999 -0.9745630000000001 | -1.8308499999999999 7.90375 -1.8308499999999999 | -0.9745630000000001 -1.8308499999999999 7.5226 ]
~ normamps=357

New Linecode.MT_ABC:4/0ACSR_ACSR_4/0_NT_NT_1_Y nphases=3 units=km
~ rmatrix = [ 0.371976 0.0781859 0.0771349 | 0.0781859 0.374118 0.0781859 | 0.0771349 0.0781859 0.371976 ]
~ xmatrix = [ 0.762496 0.296966 0.24937 | 0.296966 0.753056 0.296966 | 0.24937 0.296966 0.762496 ]
~ cmatrix = [ 7.5226 -1.8308499999999999 -0.9745630000000001 | -1.8308499999999999 7.90375 -1.8308499999999999 | -0.9745630000000001 -1.8308499999999999 7.5226 ]
~ normamps=357

New Linecode.MT_ABC:6CO_SO_NT_NT_NT_NT_NE_N nphases=3 units=km
~ rmatrix = [ 1381665631.0 0.059229335 0.059229335 | 0.059229335 1381665631.0 0.059229335 | 0.059229335 0.059229335 138166563.0 ]
~ xmatrix = [ 0.990118086 0.883343692 0.883343692 | 0.883343692 0.990118086 0.883343692 | 0.883343692 0.883343692 0.990118086 ]
~ normamps=95

New Linecode.MT_ABC:6CO_TR_NT_NT_NT_NT_NE_N nphases=3 units=km
~ rmatrix = [ 1381665631.0 0.059229335 0.059229335 | 0.059229335 1381665631.0 0.059229335 | 0.059229335 0.059229335 138166563.0 ]
~ xmatrix = [ 0.990118086 0.883343692 0.883343692 | 0.883343692 0.990118086 0.883343692 | 0.883343692 0.883343692 0.990118086 ]
~ normamps=110

New Linecode.MT_ABC:8ACSR_ACSR_8_NT_NT_4_N nphases=3 units=km
~ rmatrix = [ 376967.0 0.10603 0.105031 | 0.10603 377169.0 0.10603 | 0.105031 0.10603 376967.0 ]
~ xmatrix = [ 0.969713 0.507078 0.421285 | 0.507078 0.968879 0.449811 | 0.421285 0.449811 0.969713 ]
~ cmatrix = [ 7.27194 -2.1145 -0.8861290000000001 | -2.1145 7.45224 -1.31088 | -0.8861290000000001 -1.31088 6.90256 ]
~ normamps=70

New Linecode.MT_AC:1/0ACSR_ACSR_2_NT_NT_6_N nphases=2 units=km
~ rmatrix = [ 0.64 0.0592 0.0592 | 0.0592 0.64 0.0592 | 0.0592 0.0592 1014.2 ]
~ xmatrix = [ 10063.0 0.4478 0.4478 | 0.4478 10063.0 0.4478 | 0.4478 0.4478 10111.0 ]
~ cmatrix = [ 6.4 -1.4 | -1.4 6.4 ]
~ normamps=242

New Linecode.MT_AC:1/0ACSR_ACSR_2_NT_NT_6_Y nphases=2 units=km
~ rmatrix = [ 0.64 0.0592 0.0592 | 0.0592 0.64 0.0592 | 0.0592 0.0592 1014.2 ]
~ xmatrix = [ 10063.0 0.4478 0.4478 | 0.4478 10063.0 0.4478 | 0.4478 0.4478 10111.0 ]
~ cmatrix = [ 6.4 -1.4 | -1.4 6.4 ]
~ normamps=242

New Linecode.MT_AC:6CO_SO_NT_NT_NT_NT_NE_N nphases=2 units=km
~ rmatrix = [ 1381665631.0 0.059229335 0.059229335 | 0.059229335 1381665631.0 0.059229335 | 0.059229335 0.059229335 1381665631.0 ]
~ xmatrix = [ 0.990118086 0.883343692 0.883343692 | 0.883343692 0.990118086 0.883343692 | 0.883343692 0.883343692 0.990118086 ]
~ normamps=110

New Linecode.MT_AC:6CO_TR_NT_NT_NT_NT_NE_N nphases=2 units=km
~ rmatrix = [ 0.639951 0.592176 | 0.592176 101402.0 ]
~ xmatrix = [ 100627.0 0.53736 | 0.53736 101116.0 ]
~ normamps=409

New Linecode.MT_B:1/0AAAC_AAAC_1/0_NT_NT_7_N nphases=1 units=km
~ rmatrix = [ 0.706564 ]
~ xmatrix = [ 0.829416 ]
~ cmatrix = [ 6.7936000000000005 ]
~ normamps=256

New Linecode.MT_B:1/0AAAC_AAAC_123.3_NT_NT_7_N nphases=1 units=km
~ rmatrix = [ 0.694847 ]
~ xmatrix = [ 0.789622 ]
~ cmatrix = [ 6.8199000000000005 ]
~ normamps=256

New Linecode.MT_B:1/0AAAC_ACSR_2_NT_NT_7_N nphases=1 units=km
~ rmatrix = [ 0.68338 ]
~ xmatrix = [ 0.86438 ]
~ cmatrix = [ 6.08078 ]
~ normamps=256

New Linecode.MT_B:1/0AAAC_ACSR_2_NT_NT_7_Y nphases=1 units=km
~ rmatrix = [ 0.68338 ]
~ xmatrix = [ 0.86438 ]
~ cmatrix = [ 6.08078 ]
~ normamps=256

New Linecode.MT_B:1/0AAAC_NT_NT_NT_NT_7_Y nphases=1 units=km
~ rmatrix = [ 0.68338 ]
~ xmatrix = [ 0.86438 ]
~ cmatrix = [ 6.08078 ]
~ normamps=256

New Linecode.MT_B:1/0AAAC_NT_NT_NT_NT_NE_N nphases=1 units=km
~ rmatrix = [ 0.68338 ]
~ xmatrix = [ 0.86438 ]
~ cmatrix = [ 6.08078 ]
~ normamps=256

New Linecode.MT_B:1/0ACSR_AAAC_1/0_NT_NT_7_N nphases=1 units=km
~ rmatrix = [ 0.599697 ]
~ xmatrix = [ 0.832854 ]
~ cmatrix = [ 6.08075 ]
~ normamps=242

New Linecode.MT_B:1/0ACSR_AAAC_123.3_NT_NT_7_N nphases=1 units=km
~ rmatrix = [ 0.68338 ]
~ xmatrix = [ 0.86438 ]
~ cmatrix = [ 6.08078 ]
~ normamps=242

New Linecode.MT_B:1/0ACSR_AAAC_123.3_NT_NT_7_Y nphases=1 units=km
~ rmatrix = [ 0.68338 ]
~ xmatrix = [ 0.86438 ]
~ cmatrix = [ 6.08078 ]
~ normamps=242

New Linecode.MT_B:1/0ACSR_ACSR_1/0_NT_NT_7_N nphases=1 units=km
~ rmatrix = [ 0.677772 ]
~ xmatrix = [ 0.872159 ]
~ cmatrix = [ 6.061000000000001 ]
~ normamps=242

New Linecode.MT_B:1/0ACSR_ACSR_1/0_NT_NT_7_Y nphases=1 units=km
~ rmatrix = [ 0.677772 ]
~ xmatrix = [ 0.872159 ]
~ cmatrix = [ 6.061000000000001 ]
~ normamps=242

New Linecode.MT_B:1/0ACSR_ACSR_2_NT_NT_6_N nphases=1 units=km
~ rmatrix = [ 0.695097 ]
~ xmatrix = [ 0.904174 ]
~ cmatrix = [ 6.05987 ]
~ normamps=242

New Linecode.MT_B:1/0ACSR_ACSR_2_NT_NT_6_Y nphases=1 units=km
~ rmatrix = [ 0.695097 ]
~ xmatrix = [ 0.904174 ]
~ cmatrix = [ 6.05987 ]
~ normamps=242

New Linecode.MT_B:1/0ACSR_ACSR_2_NT_NT_7_N nphases=1 units=km
~ rmatrix = [ 0.695097 ]
~ xmatrix = [ 0.904174 ]
~ cmatrix = [ 6.05987 ]
~ normamps=242

New Linecode.MT_B:1/0ACSR_ACSR_2_NT_NT_7_Y nphases=1 units=km
~ rmatrix = [ 0.695097 ]
~ xmatrix = [ 0.904174 ]
~ cmatrix = [ 6.05987 ]
~ normamps=242

New Linecode.MT_B:1/0ACSR_ACSR_4_NT_NT_7_N nphases=1 units=km
~ rmatrix = [ 0.698122 ]
~ xmatrix = [ 0.937006 ]
~ cmatrix = [ 6.06064 ]
~ normamps=242

New Linecode.MT_B:1/0ACSR_ACSR_4_NT_NT_7_Y nphases=1 units=km
~ rmatrix = [ 0.698122 ]
~ xmatrix = [ 0.937006 ]
~ cmatrix = [ 6.06064 ]
~ normamps=242

New Linecode.MT_B:1/0ACSR_NT_NT_NT_NT_7_N nphases=1 units=km
~ rmatrix = [ 0.677772 ]
~ xmatrix = [ 0.872159 ]
~ cmatrix = [ 6.061000000000001 ]
~ normamps=242

New Linecode.MT_B:1/0ACSR_NT_NT_NT_NT_7_Y nphases=1 units=km
~ rmatrix = [ 0.698122 ]
~ xmatrix = [ 0.937006 ]
~ cmatrix = [ 6.06064 ]
~ normamps=242

New Linecode.MT_B:1/0ACSR_NT_NT_NT_NT_NE_N nphases=1 units=km
~ rmatrix = [ 0.677772 ]
~ xmatrix = [ 0.872159 ]
~ cmatrix = [ 6.061000000000001 ]
~ normamps=242

New Linecode.MT_B:1/0ACSR_NT_NT_NT_NT_NE_Y nphases=1 units=km
~ rmatrix = [ 0.68338 ]
~ xmatrix = [ 0.86438 ]
~ cmatrix = [ 6.08078 ]
~ normamps=242

New Linecode.MT_B:123.3AAAC_AAAC_1/0_NT_NT_7_N nphases=1 units=km
~ rmatrix = [ 0.667522 ]
~ xmatrix = [ 0.792563 ]
~ cmatrix = [ 6.82123 ]
~ normamps=256

New Linecode.MT_B:123.3AAAC_AAAC_123.3_NT_NT_7_N nphases=1 units=km
~ rmatrix = [ 0.665147 ]
~ xmatrix = [ 0.789499 ]
~ cmatrix = [ 6.82127 ]
~ normamps=256

New Linecode.MT_B:123.3AAAC_AAAC_123.3_NT_NT_7_Y nphases=1 units=km
~ rmatrix = [ 0.665147 ]
~ xmatrix = [ 0.789499 ]
~ cmatrix = [ 6.82127 ]
~ normamps=256

New Linecode.MT_B:123.3AAAC_ACSR_2_NT_NT_7_N nphases=1 units=km
~ rmatrix = [ 0.676864 ]
~ xmatrix = [ 0.829292 ]
~ cmatrix = [ 6.79496 ]
~ normamps=256

New Linecode.MT_B:123.3AAAC_ACSR_2_NT_NT_7_Y nphases=1 units=km
~ rmatrix = [ 0.676864 ]
~ xmatrix = [ 0.829292 ]
~ cmatrix = [ 6.79496 ]
~ normamps=256

New Linecode.MT_B:123.3AAAC_NT_NT_NT_NT_7_Y nphases=1 units=km
~ rmatrix = [ 0.676864 ]
~ xmatrix = [ 0.829292 ]
~ cmatrix = [ 6.79496 ]
~ normamps=256

New Linecode.MT_B:2ACSR_ACSR_2_NT_NT_4_N nphases=1 units=km
~ rmatrix = [ 106916.0 ]
~ xmatrix = [ 0.909066 ]
~ cmatrix = [ 6.01733 ]
~ normamps=184

New Linecode.MT_B:2ACSR_ACSR_2_NT_NT_7_N nphases=1 units=km
~ rmatrix = [ 106916.0 ]
~ xmatrix = [ 0.909066 ]
~ cmatrix = [ 6.01733 ]
~ normamps=184

New Linecode.MT_B:3/0ACSR_ACSR_2_NT_NT_7_N nphases=1 units=km
~ rmatrix = [ 0.482667 ]
~ xmatrix = [ 0.88181 ]
~ cmatrix = [ 6.26219 ]
~ normamps=315

New Linecode.MT_B:6ACSR_NT_NT_NT_NT_NE_N nphases=1 units=km
~ rmatrix = [ 149951.0 ]
~ xmatrix = [ 0.915733 ]
~ cmatrix = [ 6.21299 ]
~ normamps=409

New Linecode.MT_B:6CO_SO_NT_NT_NT_NT_NE_N nphases=1 units=km
~ rmatrix = [ 149951.0 ]
~ xmatrix = [ 0.915733 ]
~ cmatrix = [ 6.21299 ]
~ normamps=409

New Linecode.MT_B:6CO_TR_NT_NT_NT_NT_NE_N nphases=1 units=km
~ rmatrix = [ 149951.0 ]
~ xmatrix = [ 0.915733 ]
~ cmatrix = [ 6.21299 ]
~ normamps=409

New Linecode.MT_BC:1/0AAAC_NT_NT_NT_NT_NE_N nphases=2 units=km
~ rmatrix = [ 0.639951 0.0592176 | 0.0592176 101402.0 ]
~ xmatrix = [ 100627.0 0.53736 | 0.53736 101116.0 ]
~ cmatrix = [ 7.38061 -1.81775 | -1.81775 7.55931 ]
~ normamps=256

New Linecode.MT_BC:1/0ACSR_ACSR_2_NT_NT_6_N nphases=2 units=km
~ rmatrix = [ 0.639951 0.0592176 | 0.0592176 101402.0 ]
~ xmatrix = [ 100627.0 0.53736 | 0.53736 101116.0 ]
~ cmatrix = [ 7.38061 -1.81775 | -1.81775 7.55931 ]
~ normamps=242

New Linecode.MT_BC:1/0ACSR_NT_NT_NT_NT_6_Y nphases=2 units=km
~ rmatrix = [ 0.639951 0.0592176 | 0.0592176 101402.0 ]
~ xmatrix = [ 100627.0 0.53736 | 0.53736 101116.0 ]
~ cmatrix = [ 7.38061 -1.81775 | -1.81775 7.55931 ]
~ normamps=242

New Linecode.MT_BC:1/0ACSR_NT_NT_NT_NT_NE_N nphases=2 units=km
~ rmatrix = [ 0.639951 0.0592176 | 0.0592176 101402.0 ]
~ xmatrix = [ 100627.0 0.53736 | 0.53736 101116.0 ]
~ cmatrix = [ 7.38061 -1.81775 | -1.81775 7.55931 ]
~ normamps=242

New Linecode.MT_BC:123.3AAAC_AAAC_123.3_NT_NT_6_N nphases=2 units=km
~ rmatrix = [ 0.621718 0.0592176 | 0.0592176 0.621718 ]
~ xmatrix = [ 0.93139 0.44778 | 0.44778 0.93139 ]
~ cmatrix = [ 7.18731 -1.74119 | -1.74119 7.41713 ]
~ normamps=256

New Linecode.MT_BC:123.3AAAC_NT_NT_AAAC_123.3_NE_N nphases=2 units=km
~ rmatrix = [ 0.621718 0.0592176 | 0.0592176 0.621718 ]
~ xmatrix = [ 0.93139 0.44778 | 0.44778 0.93139 ]
~ cmatrix = [ 7.18731 -1.74119 | -1.74119 7.41713 ]
~ normamps=256

New Linecode.MT_BC:3/0ACSR_ACSR_1/0_NT_NT_6_Y nphases=2 units=km
~ rmatrix = [ 0.4275 0.0592 0.0592 | 0.0592 0.4275 0.0592 | 0.0592 0.0592 0.8400000000000001 ]
~ xmatrix = [ 0.9839 0.4478 0.4478 | 0.4478 0.9839 0.4478 | 0.4478 0.4478 10063.0 ]
~ cmatrix = [ 6.6 -1.5 | -1.5 6.6 ]
~ normamps=315

New Linecode.MT_BC:6CO_SO_NT_NT_NT_NT_NE_N nphases=2 units=km
~ rmatrix = [ 0.639951 0.592176 | 0.592176 101402.0 ]
~ xmatrix = [ 100627.0 0.53736 | 0.53736 101116.0 ]
~ normamps=409

New Linecode.MT_BC:6CO_TR_NT_NT_NT_NT_NE_N nphases=2 units=km
~ rmatrix = [ 0.639951 0.592176 | 0.592176 101402.0 ]
~ xmatrix = [ 100627.0 0.53736 | 0.53736 101116.0 ]
~ normamps=110

New Linecode.MT_C:1/0AAAC_AAAC_1/0_NT_NT_7_N nphases=1 units=km
~ rmatrix = [ 0.706564 ]
~ xmatrix = [ 0.829416 ]
~ cmatrix = [ 6.7936000000000005 ]
~ normamps=256

New Linecode.MT_C:1/0AAAC_AAAC_1/0_NT_NT_7_Y nphases=1 units=km
~ rmatrix = [ 0.706564 ]
~ xmatrix = [ 0.829416 ]
~ cmatrix = [ 6.7936000000000005 ]
~ normamps=256

New Linecode.MT_C:1/0AAAC_AAAC_123.3_NT_NT_7_N nphases=1 units=km
~ rmatrix = [ 0.694847 ]
~ xmatrix = [ 0.789622 ]
~ cmatrix = [ 6.8199000000000005 ]
~ normamps=256

New Linecode.MT_C:1/0AAAC_AAAC_2_NT_NT_7_N nphases=1 units=km
~ rmatrix = [ 0.710078 ]
~ xmatrix = [ 0.82243 ]
~ cmatrix = [ 6.81346 ]
~ normamps=256

New Linecode.MT_C:1/0AAAC_ACSR_2_NT_NT_7_N nphases=1 units=km
~ rmatrix = [ 0.706564 ]
~ xmatrix = [ 0.829416 ]
~ cmatrix = [ 6.7936000000000005 ]
~ normamps=256

New Linecode.MT_C:1/0AAAC_ACSR_2_NT_NT_7_Y nphases=1 units=km
~ rmatrix = [ 0.706564 ]
~ xmatrix = [ 0.829416 ]
~ cmatrix = [ 6.7936000000000005 ]
~ normamps=256

New Linecode.MT_C:1/0AAAC_NT_NT_NT_NT_7_N nphases=1 units=km
~ rmatrix = [ 0.710078 ]
~ xmatrix = [ 0.82243 ]
~ cmatrix = [ 6.81346 ]
~ normamps=256

New Linecode.MT_C:1/0AAAC_NT_NT_NT_NT_7_Y nphases=1 units=km
~ rmatrix = [ 0.706564 ]
~ xmatrix = [ 0.829416 ]
~ cmatrix = [ 6.7936000000000005 ]
~ normamps=256

New Linecode.MT_C:1/0AAAC_NT_NT_NT_NT_NE_N nphases=1 units=km
~ rmatrix = [ 0.706564 ]
~ xmatrix = [ 0.829416 ]
~ cmatrix = [ 6.7936000000000005 ]
~ normamps=256

New Linecode.MT_C:1/0AAAC_NT_NT_NT_NT_NE_Y nphases=1 units=km
~ rmatrix = [ 0.710078 ]
~ xmatrix = [ 0.82243 ]
~ cmatrix = [ 6.81346 ]
~ normamps=256

New Linecode.MT_C:1/0AAC_AAAC_77.4_NT_NT_7_N nphases=1 units=km
~ rmatrix = [ 0.679359 ]
~ xmatrix = [ 0.829343 ]
~ cmatrix = [ 6.747590000000001 ]
~ normamps=247

New Linecode.MT_C:1/0AAC_AAAC_77.4_NT_NT_7_Y nphases=1 units=km
~ rmatrix = [ 0.679359 ]
~ xmatrix = [ 0.829343 ]
~ cmatrix = [ 6.747590000000001 ]
~ normamps=247

New Linecode.MT_C:1/0ACSR_AAAC_1/0_NT_NT_7_N nphases=1 units=km
~ rmatrix = [ 0.706564 ]
~ xmatrix = [ 0.829416 ]
~ cmatrix = [ 6.7936000000000005 ]
~ normamps=242

New Linecode.MT_C:1/0ACSR_AAAC_123.3_NT_NT_7_N nphases=1 units=km
~ rmatrix = [ 0.68338 ]
~ xmatrix = [ 0.86438 ]
~ cmatrix = [ 6.08078 ]
~ normamps=242

New Linecode.MT_C:1/0ACSR_AAAC_123.3_NT_NT_7_Y nphases=1 units=km
~ rmatrix = [ 0.68338 ]
~ xmatrix = [ 0.86438 ]
~ cmatrix = [ 6.08078 ]
~ normamps=242

New Linecode.MT_C:1/0ACSR_AAAC_2_NT_NT_7_N nphases=1 units=km
~ rmatrix = [ 0.68338 ]
~ xmatrix = [ 0.86438 ]
~ cmatrix = [ 6.08078 ]
~ normamps=242

New Linecode.MT_C:1/0ACSR_AAAC_2_NT_NT_7_Y nphases=1 units=km
~ rmatrix = [ 0.68338 ]
~ xmatrix = [ 0.86438 ]
~ cmatrix = [ 6.08078 ]
~ normamps=242

New Linecode.MT_C:1/0ACSR_AAAC_77.4_NT_NT_7_N nphases=1 units=km
~ rmatrix = [ 0.698896 ]
~ xmatrix = [ 0.898084 ]
~ cmatrix = [ 6.07572 ]
~ normamps=242

New Linecode.MT_C:1/0ACSR_AAAC_77.4_NT_NT_7_Y nphases=1 units=km
~ rmatrix = [ 0.698896 ]
~ xmatrix = [ 0.898084 ]
~ cmatrix = [ 6.07572 ]
~ normamps=242

New Linecode.MT_C:1/0ACSR_ACSR_1/0_NT_NT_7_N nphases=1 units=km
~ rmatrix = [ 0.677772 ]
~ xmatrix = [ 0.872159 ]
~ cmatrix = [ 6.061000000000001 ]
~ normamps=242

New Linecode.MT_C:1/0ACSR_ACSR_1/0_NT_NT_7_Y nphases=1 units=km
~ rmatrix = [ 0.677772 ]
~ xmatrix = [ 0.872159 ]
~ cmatrix = [ 6.061000000000001 ]
~ normamps=242

New Linecode.MT_C:1/0ACSR_ACSR_2_NT_NT_6_N nphases=1 units=km
~ rmatrix = [ 0.677772 ]
~ xmatrix = [ 0.872159 ]
~ cmatrix = [ 6.061000000000001 ]
~ normamps=242

New Linecode.MT_C:1/0ACSR_ACSR_2_NT_NT_7_N nphases=1 units=km
~ rmatrix = [ 0.677772 ]
~ xmatrix = [ 0.872159 ]
~ cmatrix = [ 6.061000000000001 ]
~ normamps=242

New Linecode.MT_C:1/0ACSR_ACSR_2_NT_NT_7_Y nphases=1 units=km
~ rmatrix = [ 0.677772 ]
~ xmatrix = [ 0.872159 ]
~ cmatrix = [ 6.061000000000001 ]
~ normamps=242

New Linecode.MT_C:1/0ACSR_NT_NT_NT_NT_6_Y nphases=1 units=km
~ rmatrix = [ 0.706564 ]
~ xmatrix = [ 0.829416 ]
~ cmatrix = [ 6.7936000000000005 ]
~ normamps=242

New Linecode.MT_C:1/0ACSR_NT_NT_NT_NT_7_N nphases=1 units=km
~ rmatrix = [ 0.68338 ]
~ xmatrix = [ 0.86438 ]
~ cmatrix = [ 6.08078 ]
~ normamps=242

New Linecode.MT_C:1/0ACSR_NT_NT_NT_NT_7_Y nphases=1 units=km
~ rmatrix = [ 0.677772 ]
~ xmatrix = [ 0.872159 ]
~ cmatrix = [ 6.061000000000001 ]
~ normamps=242

New Linecode.MT_C:1/0ACSR_NT_NT_NT_NT_NE_N nphases=1 units=km
~ rmatrix = [ 0.68338 ]
~ xmatrix = [ 0.86438 ]
~ cmatrix = [ 6.08078 ]
~ normamps=242

New Linecode.MT_C:123.3AAAC_AAAC_1/0_NT_NT_7_N nphases=1 units=km
~ rmatrix = [ 0.667522 ]
~ xmatrix = [ 0.792563 ]
~ cmatrix = [ 6.82123 ]
~ normamps=256

New Linecode.MT_C:123.3AAAC_AAAC_123.3_NT_NT_7_N nphases=1 units=km
~ rmatrix = [ 0.665147 ]
~ xmatrix = [ 0.789499 ]
~ cmatrix = [ 6.82127 ]
~ normamps=256

New Linecode.MT_C:123.3AAAC_AAAC_123.3_NT_NT_7_Y nphases=1 units=km
~ rmatrix = [ 0.665147 ]
~ xmatrix = [ 0.789499 ]
~ cmatrix = [ 6.82127 ]
~ normamps=256

New Linecode.MT_C:123.3AAAC_AAAC_77.4_NT_NT_7_N nphases=1 units=km
~ rmatrix = [ 0.680663 ]
~ xmatrix = [ 0.823203 ]
~ cmatrix = [ 6.8149 ]
~ normamps=256

New Linecode.MT_C:123.3AAAC_AAAC_77.4_NT_NT_7_Y nphases=1 units=km
~ rmatrix = [ 0.680663 ]
~ xmatrix = [ 0.823203 ]
~ cmatrix = [ 6.8149 ]
~ normamps=256

New Linecode.MT_C:123.3AAAC_ACSR_1/0_NT_NT_7_N nphases=1 units=km
~ rmatrix = [ 0.659539 ]
~ xmatrix = [ 0.797278 ]
~ cmatrix = [ 6.796390000000001 ]
~ normamps=256

New Linecode.MT_C:123.3AAAC_ACSR_1/0_NT_NT_7_Y nphases=1 units=km
~ rmatrix = [ 0.659539 ]
~ xmatrix = [ 0.797278 ]
~ cmatrix = [ 6.796390000000001 ]
~ normamps=256

New Linecode.MT_C:123.3AAAC_ACSR_123.3_NT_NT_7_N nphases=1 units=km
~ rmatrix = [ 0.665147 ]
~ xmatrix = [ 0.789499 ]
~ cmatrix = [ 6.82127 ]
~ normamps=256

New Linecode.MT_C:123.3AAAC_ACSR_2_NT_NT_7_N nphases=1 units=km
~ rmatrix = [ 0.676864 ]
~ xmatrix = [ 0.829292 ]
~ cmatrix = [ 6.79496 ]
~ normamps=256

New Linecode.MT_C:123.3AAAC_ACSR_2_NT_NT_7_Y nphases=1 units=km
~ rmatrix = [ 0.676864 ]
~ xmatrix = [ 0.829292 ]
~ cmatrix = [ 6.79496 ]
~ normamps=256

New Linecode.MT_C:123.3AAAC_NT_NT_NT_NT_7_N nphases=1 units=km
~ rmatrix = [ 0.680663 ]
~ xmatrix = [ 0.823203 ]
~ cmatrix = [ 6.8149 ]
~ normamps=256

New Linecode.MT_C:123.3AAAC_NT_NT_NT_NT_7_Y nphases=1 units=km
~ rmatrix = [ 0.665147 ]
~ xmatrix = [ 0.789499 ]
~ cmatrix = [ 6.82127 ]
~ normamps=256

New Linecode.MT_C:123.3AAAC_NT_NT_NT_NT_NE_N nphases=1 units=km
~ rmatrix = [ 0.680663 ]
~ xmatrix = [ 0.823203 ]
~ cmatrix = [ 6.8149 ]
~ normamps=256

New Linecode.MT_C:2ACSR_ACSR_2_NT_NT_7_N nphases=1 units=km
~ rmatrix = [ 106916.0 ]
~ xmatrix = [ 0.909066 ]
~ cmatrix = [ 6.01733 ]
~ normamps=184

New Linecode.MT_C:2ACSR_ACSR_2_NT_NT_7_Y nphases=1 units=km
~ rmatrix = [ 106916.0 ]
~ xmatrix = [ 0.909066 ]
~ cmatrix = [ 6.01733 ]
~ normamps=184

New Linecode.MT_C:2ACSR_ACSR_2_NT_NT_NE_N nphases=1 units=km
~ rmatrix = [ 106916.0 ]
~ xmatrix = [ 0.909066 ]
~ cmatrix = [ 6.01733 ]
~ normamps=184

New Linecode.MT_C:2ACSR_NT_NT_NT_NT_7_Y nphases=1 units=km
~ rmatrix = [ 106916.0 ]
~ xmatrix = [ 0.909066 ]
~ cmatrix = [ 6.01733 ]
~ normamps=184

New Linecode.MT_C:2/0ACSR_ACSR_2_NT_NT_7_N nphases=1 units=km
~ rmatrix = [ 106916.0 ]
~ xmatrix = [ 0.909066 ]
~ cmatrix = [ 6.01733 ]
~ normamps=276

New Linecode.MT_C:3/0ACSR_ACSR_1/0_NT_NT_7_N nphases=1 units=km
~ rmatrix = [ 0.465342 ]
~ xmatrix = [ 0.849795 ]
~ cmatrix = [ 6.2634099999999995 ]
~ normamps=315

New Linecode.MT_C:3/0ACSR_ACSR_2_NT_NT_7_N nphases=1 units=km
~ rmatrix = [ 0.482667 ]
~ xmatrix = [ 0.88181 ]
~ cmatrix = [ 6.26219 ]
~ normamps=315

New Linecode.MT_C:6ACSR_ACSR_6_NT_NT_NE_N nphases=1 units=km
~ rmatrix = [ 149951.0 ]
~ xmatrix = [ 0.915733 ]
~ cmatrix = [ 6.21299 ]
~ normamps=409

New Linecode.MT_C:6CO_SO_ACSR_2_NT_NT_7_N nphases=1 units=km
~ rmatrix = [ 149472.0 ]
~ xmatrix = [ 0.891734 ]
~ cmatrix = [ 6.17076 ]
~ normamps=125

New Linecode.MT_C:6CO_SO_NT_NT_NT_NT_NE_N nphases=1 units=km
~ rmatrix = [ 0.891734 ]
~ xmatrix = [ 0.915733 ]
~ cmatrix = [ 6.21299 ]
~ normamps=85

New Linecode.MT_C:6CO_TR_NT_NT_NT_NT_NE_N nphases=1 units=km
~ rmatrix = [ 0.891734 ]
~ xmatrix = [ 0.915733 ]
~ cmatrix = [ 6.21299 ]
~ normamps=85

New Linecode.MT_SUB_A:_1/0COBREEPR_33 nphases=1 units=km
~ rmatrix = [ 0.738416 ]
~ xmatrix = [ 0.547332 ]
~ cmatrix = [ 169.108 ]
~ normamps=214

New Linecode.MT_SUB_ABC:_1/0COBREEPR_33 nphases=3 units=km
~ rmatrix = [ 0.60641 0.243905 0.225298 | 0.243905 0.606751 0.243905 | 0.225298 0.243905 0.60641 ]
~ xmatrix = [ 0.352213 0.0627985 0.0293372 | 0.0627985 0.325511 0.0627985 | 0.0293372 0.0627985 0.352213 ]
~ cmatrix = [ 169.108 0.0 0.0 | 0.0 169.108 0.0 | 0.0 0.0 169.108 ]
~ normamps=214

New Linecode.MT_SUB_ABC:_1/0COBRE_EPR_33 nphases=3 units=km
~ rmatrix = [ 0.60641 0.243905 0.225298 | 0.243905 0.606751 0.243905 | 0.225298 0.243905 0.60641 ]
~ xmatrix = [ 0.352213 0.0627985 0.0293372 | 0.0627985 0.325511 0.0627985 | 0.0293372 0.0627985 0.352213 ]
~ cmatrix = [ 169.108 0.0 0.0 | 0.0 169.108 0.0 | 0.0 0.0 169.108 ]
~ normamps=214

New Linecode.MT_SUB_ABC:_1/0COBRE_EPR_COBRE_100_prueba nphases=3 units=km
~ rmatrix = [ 0.60641 0.243905 0.225298 | 0.243905 0.606751 0.243905 | 0.225298 0.243905 0.60641 ]
~ xmatrix = [ 0.352213 0.0627985 0.0293372 | 0.0627985 0.325511 0.0627985 | 0.0293372 0.0627985 0.352213 ]
~ cmatrix = [ 169.108 0.0 0.0 | 0.0 169.108 0.0 | 0.0 0.0 169.108 ]
~ normamps=214

New Linecode.MT_SUB_ABC:_1/0COBRE_EPR_COBRE_33 nphases=3 units=km
~ rmatrix = [ 0.60641 0.243905 0.225298 | 0.243905 0.606751 0.243905 | 0.225298 0.243905 0.60641 ]
~ xmatrix = [ 0.352213 0.0627985 0.0293372 | 0.0627985 0.325511 0.0627985 | 0.0293372 0.0627985 0.352213 ]
~ cmatrix = [ 169.108 0.0 0.0 | 0.0 169.108 0.0 | 0.0 0.0 169.108 ]
~ normamps=214

New Linecode.MT_SUB_A:_1/0COBREEPR_33_211_35 nphases=1 units=km
~ rmatrix = [ 0.738416 ]
~ xmatrix = [ 0.547332 ]
~ cmatrix = [ 169.108 ]
~ normamps=214

New Linecode.MT_SUB_B:_1/0COBREEPR_33_211_35 nphases=1 units=km
~ rmatrix = [ 0.738416 ]
~ xmatrix = [ 0.547332 ]
~ cmatrix = [ 169.108 ]
~ normamps=214

New Linecode.MT_SUB_C:_1/0COBREEPR_33_211_35 nphases=1 units=km
~ rmatrix = [ 0.738416 ]
~ xmatrix = [ 0.547332 ]
~ cmatrix = [ 169.108 ]
~ normamps=214

New Linecode.MT_SUB_ABC:_1/0COBREEPR_33_C231_35 nphases=3 units=km
~ rmatrix = [ 0.606751 0.243905 0.243905 | 0.243905 0.60641 0.225298 | 0.243905 0.225298 0.60641 ]
~ xmatrix = [ 0.325511 0.0627985 0.0627985 | 0.0627985 0.352213 0.0293372 | 0.0627985 0.0293372 0.352213 ]
~ cmatrix = [ 169.108 0.0 0.0 | 0.0 169.108 0.0 | 0.0 0.0 169.108 ]
~ normamps=214

New Linecode.MT_SUB_ABC:_250COBREEPR_33_C231_35 nphases=3 units=km
~ rmatrix = [ 0.296534 0.115142 0.115142 | 0.115142 0.310847 0.0915734 | 0.115142 0.0915734 0.310847 ]
~ xmatrix = [ 0.204596 -0.0132497 -0.0132497 | -0.0132497 0.226209 -0.0346415 | -0.0132497 -0.0346415 0.226209 ]
~ cmatrix = [ 223.102 0.0 0.0 | 0.0 223.102 0.0 | 0.0 0.0 223.102 ]
~ normamps=344

New Linecode.MT_SUB_ABC:_1/0COBRE_EPR_COBRE_33_prueba nphases=3 units=km
~ rmatrix = [ 0.60641 0.243905 0.225298 | 0.243905 0.606751 0.243905 | 0.225298 0.243905 0.60641 ]
~ xmatrix = [ 0.352213 0.0627985 0.0293372 | 0.0627985 0.325511 0.0627985 | 0.0293372 0.0627985 0.352213 ]
~ cmatrix = [ 169.108 0.0 0.0 | 0.0 169.108 0.0 | 0.0 0.0 169.108 ]
~ normamps=214

New Linecode.MT_SUB_ABC:_250COBREEPR_33 nphases=3 units=km
~ rmatrix = [ 0.310847 0.115142 0.0915734 | 0.115142 0.296534 0.115142 | 0.0915734 0.115142 0.310847 ]
~ xmatrix = [ 0.226209 -0.0132497 -0.0346415 | -0.0132497 0.204596 -0.0132497 | -0.0346415 -0.0132497 0.226209 ]
~ cmatrix = [ 223.102 0.0 0.0 | 0.0 223.102 0.0 | 0.0 0.0 223.102 ]
~ normamps=344

New Linecode.MT_SUB_ABC:_250COBRE_EPR_33 nphases=3 units=km
~ rmatrix = [ 0.310847 0.115142 0.0915734 | 0.115142 0.296534 0.115142 | 0.0915734 0.115142 0.310847 ]
~ xmatrix = [ 0.226209 -0.0132497 -0.0346415 | -0.0132497 0.204596 -0.0132497 | -0.0346415 -0.0132497 0.226209 ]
~ cmatrix = [ 223.102 0.0 0.0 | 0.0 223.102 0.0 | 0.0 0.0 223.102 ]
~ normamps=344

New Linecode.MT_SUB_ABC:_250COBRE_EPR_COBRE_33 nphases=3 units=km
~ rmatrix = [ 0.310847 0.115142 0.0915734 | 0.115142 0.296534 0.115142 | 0.0915734 0.115142 0.310847 ]
~ xmatrix = [ 0.226209 -0.0132497 -0.0346415 | -0.0132497 0.204596 -0.0132497 | -0.0346415 -0.0132497 0.226209 ]
~ cmatrix = [ 223.102 0.0 0.0 | 0.0 223.102 0.0 | 0.0 0.0 223.102 ]
~ normamps=344

New Linecode.MT_SUB_ABC:_250COBRE_EPR_COBRE_33_Prueba nphases=3 units=km
~ rmatrix = [ 0.310847 0.115142 0.0915734 | 0.115142 0.296534 0.115142 | 0.0915734 0.115142 0.310847 ]
~ xmatrix = [ 0.226209 -0.0132497 -0.0346415 | -0.0132497 0.204596 -0.0132497 | -0.0346415 -0.0132497 0.226209 ]
~ cmatrix = [ 223.102 0.0 0.0 | 0.0 223.102 0.0 | 0.0 0.0 223.102 ]
~ normamps=344

New Linecode.MT_SUB_ABC:_500COBRE_XLPE_COBRE_33_Prueba nphases=3 units=km
~ rmatrix = [ 0.181999 0.0460269 0.0242862 | 0.0460269 0.164082 0.0460269 | 0.0242862 0.0460269 0.181999 ]
~ xmatrix = [ 0.155286 -0.0224111 -0.0272078 | -0.0224111 0.149039 -0.0224111 | -0.0272078 -0.0224111 0.155286 ]
~ cmatrix = [ 215.298 0.0 0.0 | 0.0 215.298 0.0 | 0.0 0.0 215.298 ]
~ normamps=476

New Linecode.MT_SUB_B:_1/0COBREEPR_33 nphases=1 units=km
~ rmatrix = [ 0.738416 ]
~ xmatrix = [ 0.547332 ]
~ cmatrix = [ 169.108 ]
~ normamps=214

New Linecode.MT_SUB_B:_1/0COBRE_EPR_COBRE_33 nphases=1 units=km
~ rmatrix = [ 0.738416 ]
~ xmatrix = [ 0.547332 ]
~ cmatrix = [ 169.108 ]
~ normamps=214

New Linecode.MT_SUB_B:_1/0COBRE_EPR_COBRE_33_Prueba nphases=1 units=km
~ rmatrix = [ 0.738416 ]
~ xmatrix = [ 0.547332 ]
~ cmatrix = [ 169.108 ]
~ normamps=214

New Linecode.MT_SUB_C:_1/0COBREEPR_33 nphases=1 units=km
~ rmatrix = [ 0.738416 ]
~ xmatrix = [ 0.547332 ]
~ cmatrix = [ 169.108 ]
~ normamps=214

New Linecode.MT_SUB_C:_1/0COBRE_EPR_COBRE_33_Prueba nphases=1 units=km
~ rmatrix = [ 0.738416 ]
~ xmatrix = [ 0.547332 ]
~ cmatrix = [ 169.108 ]
~ normamps=214
